F := 4.7  # Тяговая сила ленты [кН]
V := 0.60  # Скорость грузовой цепи [м/с]
t := 100  # Шаг грузовой цепи [мм]
z := 7  # Число зубьев звездочки
L_r := 7  # Срок службы привода [лет]
L_с := 1  # Сменность работы
t_c := 6  # Продолжительность смены [ч]
# Расчет параметров двигателя
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N_р.м. := F*V = 2.82  # Требуемая мощность рабочей машины
η_з.п. := (0.93 + 0.95)/2  # КПД закрытой передачи;
η_о.п. := (0.92 + 0.94)/2  # открытой передачи
η_м. := 0.98  # муфты
η_п.к. := (0.99 + 0.995)/2  # одной пары подшипников качения
η := η_з.п.*η_о.п.*η_м.*η_п.к.^3 = 0.837584  # Общий КПД привода
N_р.д. := N_р.м./η = 3.36683  # Расчетная мощность двигателя [кВт]
# Выбранный двигатель:
# ТИП : АИР112МВ6
P := 4  # Номинальная мощность [кВт]
n_ном := 950  # Номинальная частота вращения [об/мин]
η_д := 83.4  # КПД [%]
# Определение передаточного отношения привода
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n_р.о. := 60*1000*V/(z*t) = 51.4286  # Частота вращения приводного вала рабочей машины [об/мин]
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u := n_ном/n_р.о. = 18.4722  # Передаточное отношение привода
u_з.п. := 4.5  # Передаточное отношение закрытой передачи
u_о.п. := u/u_з.п. = 4.10494  # Передаточное отношение открытой передачи
# Кинематический расчет привода
# Определение силовых и кинематических параметров привода:
# (Б) - быстроходный вал двигателя
# (Т) - тихоходный вал двигателя
# (PO) - вал рабочего органа
# Мощность N, кВт
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# Двигателя
N_д := P = 4
Б
N_1 := N_д*η_м.*η_п.к. = 3.8906
Т
N_2 := N_1*η_з.п.*η_п.к. = 3.62974
РО
N_РО := N_2*η_о.п.*η_п.к. = 3.35034
# Частота вращения n, мин^-1
# Двигателя
n_ном = 950
Б
n_1 := n_ном = 950
Т
n_2 := n_1/u_з.п. = 211.111
РО
n_РО := n_2/u_о.п. = 51.4286
# Угловая скорость ω, c^-^1
# Двигателя
ω_ном := π*n_ном/30 = 99.4838
Б
ω_1 := ω_ном = 99.4838
Т
ω_2 := ω_1/u_з.п. = 22.1075
РО
ω_РО := ω_2/u_о.п. = 5.38559
# Вращающий момент T, Н*м
# Двигателя
T_д := N_д*10^3/ω_ном = 40.2076
Б
T_1 := T_д*η_м.*η_п.к. = 39.1079
Т
T_2 := T_1*u_з.п.*η_з.п.*η_п.к. = 164.186
РО
T_РО := T_2*u_о.п.*η_о.п.*η_п.к. = 622.093
# Проектирование зубчатой цилиндрической передачи
n_2 = 211.111
T_2 = 164.186
n_РО = 51.4286
T_РО = 622.093
# Для изготовления колеса и шестерни выбираем сравнительно недорогой материал – сталь 20Х
HRC_min := 56  # Твердость поверхности
HRC_max := 63
HRC_avr := (HRC_min + HRC_max)/2 = 59.5
σ_В := 650  # Предел прочности [МПа]
σ_Т := 400  # Предел текучести [МПа]
# Расчет напряжений
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# Твердость колеса должна быть меньше чем твердость шестерни
# Для шестерни
HRC_m1 := 60
HB_m1 := 650
# Для колеса
HRC_m2 := 58
HB_m2 := 620
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σ_Hlim1 := 23*HRC_m1 = 1380  # Предел контактной выносливости для шестерни [МПа]
σ_Hlim2 := 23*HRC_m2 = 1334  # Предел контактной выносливости для колеса [МПа]
# Расчет коэффициента долговечности
S_H := 1.2  # Коэффициент безопасности
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N_HG1 := 30*HB_m1^2.4 = 169088204  # Базовое число циклов шестерни
N_HG2 := 30*HB_m2^2.4 = 150959799  # Колеса
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K_D := 255  # Количество рабочих дней в году
L_r = 7  # Срок службы
L_с = 1  # Количество смен
t_c = 6  # Продолжительность смены
t_р.п := L_r*K_D*L_с*t_c = 10710  # Ресурс работы передачи в часах
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μ_H := 0.18  # Коэффициент режима работы
c := 1  # Кол. колес находящихся в зацеплении с данным
N_НЕ1 := μ_H*60*c*n_2*t_р.п = 24418800  # Эквивалентное число циклов шестерни
N_НЕ2 := μ_H*60*c*n_РО*t_р.п = 5948640  # Колеса
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Z_N1 := nthroot(N_HG1/N_НЕ1, 6) = 1.38059  # Коэффициент долговечности шестерни
Z_N2 := nthroot(N_HG2/N_НЕ2, 6) = 1.71425  # Колеса
# Допускаемое контактное напряжение шестерни
σ_H1 := σ_Hlim1/S_H*Z_N1 = 1587.68
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σ_H2 := σ_Hlim2/S_H*Z_N2 = 1905.67  # Колеса
σ_Hm := (σ_H1 + σ_H2)/2 = 1746.68  # Среднее допускаемое напряжение
σ_Hmin := σ_H1 = 1587.68  # Меньшее из σ_H1 и σ_H2
σ_Hп := 1.25*σ_Hmin = 1984.6  # Предельные контактные напряжения
σ_H := σ_Hm = 1746.68  # Окончательное (меньшее из σ_Hm и σ_Hп)
# Расчет допускаемого напряжения изгиба
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σ_Flim1 := 800  # Предел выносливости по напряжению изгиба шестерни
σ_Flim2 := 800  # колеса
m_F := 9
N_FG := 4*10^6  # базовое число циклов для всех сталей
μ_F1 := 0.036  # коэффициент режима работы (напряжение изгиба)
# Эквивалентное число циклов
# шестерни | колеса
N_FE1 := μ_F1*60*c*n_2*t_р.п = 4883760
N_FE2 := μ_F1*60*c*n_РО*t_р.п = 1189728
# Коэффициент долговечности
# шестерни
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# колеса
Y_N1 := nthroot(N_FG/N_FE1, m_F) = 0.978064
Y_N1 := 1
Y_N2 := nthroot(N_FG/N_FE2, m_F) = 1.14423
S_F := 1.55  # Коэффициент безопасности
Y_A := 1  # Коэффициент влияния 2-сторонней нагрузки
# Допускаемое напряжение изгиба [МПа]
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# шестерни | колеса
σ_F1 := σ_Flim1/S_F*Y_A*Y_N1 = 516.129
σ_F2 := σ_Flim2/S_F*Y_A*Y_N2 = 590.569
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# Максимальные допускаемые контактные напряжения [МПа]
# шестерни | колеса
σ_Hmax1 := 44*HRC_m1 = 2640
σ_Hmax2 := 44*HRC_m2 = 2552
# Максимальные допускаемые напряжения изгиба
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Y_Nmax := 2.5  # коэффициент долговечности
K_st := 1.2  # коэффициент учета частоты приложения пиковой нагрузки
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σ_Fmax1 := 0.5*σ_Flim1*Y_Nmax*K_st = 1200  # шестерни
σ_Fmax2 := 0.5*σ_Flim2*Y_Nmax*K_st = 1200  # колеса
# Проектный расчет цилиндрической прямозубой передачи
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# Формула(2.48)
u_о.п. = 4.10494  # Передаточное число требуемое от передачи
T_РО = 622.093  # Момент требуемый на колесе[Н*м]
E_np := 2.1*10^5  # Приведенный модуль упругости [МПа]
σ_H = 1746.68  # Контактное напряжение
Ψ_ba := (0.15 + 0.2)/2 = 0.175  # Коэффициент ширины колеса относительно межосевого расстояния
Ψ_bdmax := (0.45 + 0.55)/2 = 0.5  # Табл(2.7)
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# Формула(2.17)
Ψ_bd := 0.5*Ψ_ba*(u_о.п. + 1) = 0.446682  # Коэффициент ширины колеса относительно делительного диаметра
# Рис(2.4)
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K_Hβ := 1.03
C := 0.06  # Коэффициент твердости и типа зубьев
n_ст := 9  # Степень точности изготовления колес (5-9)
# Формула(2.32)
# Допускаемое контактное напряжение
K_Hα := 1 + C*(n_ст - 5) = 1.24
# Межосевое расстояние[мм]
a_w := 0.85*(u_о.п. + 1)*nthroot(E_np*T_РО*10^3*K_Hα*K_Hβ/(σ_H^2*u_о.п.*Ψ_ba), 3) = 183.907
a_w := 180  # Округляем межосевое расстояние до ближайшего стандартного Табл(2.2)
b_w := a_w*Ψ_ba = 31.5  # Ширена зубчатых колес по формуле(2.49)
b_w1 := b_w + 6.5 = 38  # Ширена Шестерни (добавляется 5-10 мм)
b_w2 := b_w = 31.5  # Ширена Колеса
Ψ_m := (20 + 15)/2 = 17.5  # Табл(2.8)
m := b_w/Ψ_m = 1.8  # Модуль передачи по формуле(2.19)(принимаем стандартный модуль 2)
m := 2
z_Δ := 2*a_w/m = 180  # Суммарное количество зубьев по формуле(2.50)
z_1 := z_Δ/(u_о.п. + 1) = 35.26  # Количество зубьев Шестерни
z_2 := z_Δ - z_1 = 144.74  # Количество зубьев Колеса
z_1 := 35
z_2 := 145  # Округляем
# Нахождение погрешности
u_о.п. = 4.10494
z_2/z_1 = 4.14286
z_2/z_1*(u_о.п./100)^-1 = 100.924  # Погрешность <5% так что все хорошо
d_1 := m*z_1 = 70  # Делительный диаметр шестерни
d_2 := m*z_2 = 290  # Делительный диаметр колеса
# Проверочные расчеты цилиндрической прямозубой передачи
β := 0  # Угол наклона зубьев =0 т.к. передача прямозубая
ε_a := (0.95 - 1.6*(1/z_1 + 1/z_2))*(1 + cos(β))*cos(β) = 1.7865  # Коэффициент перекрытия по формуле(2.28)
ε_β := b_w*sin(β)/(π*m) = 0  # Коэффициент осевого перекрытия по формуле(2.29)
Z_Hβ := sqrt(cos(β)^2/ε_a) = 0.748166  # По формуле(2.30)
n_ст = 9  # Степень точности изготовления колес (5-9)
C = 0.06  # Коэффициент твердости и типа зубьев
K_Ha := 1 + C*(n_ст - 5) = 1.24  # Коэффициент распределения нагрузки между зубьями по формуле(2.32)
v := π*d_1*10^-3*n_1/60 = 3.48193  # Окружная скорость[м/с] по формуле(2.33)
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K_Hv := 1.5  # По табл(В.1)
K_H := K_Ha*K_Hβ*K_Hv = 1.9158  # Коэффициент расчетной нагрузки по формуле(2.31)
E_np = 210000
# Шестерни | Колеса
b_w := 20
b_w1 = 38
b_w2 = 31.5
b_w1 := b_w + 8 = 28
b_w2 := b_w = 20
σ_H = 1746.68  # Контактное напряжение рассчитанное до
a' := 20
σ_H.пр := 1.18*Z_Hβ + sqrt(E_np*T_2*10^3*K_H/(d_1^2*b_w*sin(2*a'°))*((u_о.п. + 1)/u_о.п.)) = 1142.83  # по формуле(2.27)
Δ_σH := (σ_H.пр - σ_H)/σ_H*100 = -34.5709  # Перегрузка(недогрузка)
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# по формуле(2.1)стр 33
F_t := 2*T_2/(d_1*10^-3) = 4691.02
x_1 := 0
x_2 := 0
F_r := F_t*tan(a_w°)/cos(β) = -5.74465e-13
F_a := F_t*tan(β) = 0
z_v1 := z_1/cos(β)^3 = 35
z_v2 := z_2/cos(β)^3 = 145
# шестерня | колесо
Y_FS1 := 3.82
Y_FS2 := 3.75  # По рис(2.6)
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σ_F1/Y_FS1 = 135.112
σ_F2/Y_FS2 = 157.485
# Дальнейший расчет ведем по шестерне тк это соотношение меньше
σ_F := σ_F1 = 516.129
Y_FS := Y_FS1 = 3.82
Y_β := 1 - β°/100 = 1
Y_Fβ := Y_β/ε_a = 0.559753
K_Fa := K_Ha = 1.24
K_Fβ := 1.04
Ψ_bd = 0.446682  # По рис(2.7)
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K_Fv := K_Hv = 1.5
K_F := K_Fa*K_Fβ*K_Fv = 1.9344
σ_F = 516.129  # Рассчитанное до напряжение изгиба
σ_F.пр := F_t*K_F*Y_FS*Y_Fβ/(b_w*m) = 485.08  # Напряжение изгиба
Δ_σF := (σ_F.пр - σ_F)/σ_F*100 = -6.01578  # Небольшая недогрузка так что все хорошо
K_П := 2  # Допускаемая перегрузка передачи
σ_Hmax1 = 2640
σ_Hmax2 = 2552
σ_Hmax := σ_H.пр*sqrt(K_П) = 1616.21  # Т.к. меньше 2 верхних все рассчитано верно
σ_Fmax1 = 1200
σ_Fmax2 = 1200
σ_Fmax := σ_F.пр*K_П = 970.16  # Т.к. меньше 2 верхних все рассчитано верно
# Расчет геометрии передачи и оформление результатов расчета
h_a := 1  # Коэффициент высоты головки зуба
Δy := 0  # Коэффициент уравнительного смещения
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x_1 = 0
x_2 = 0
c_z := 0.25  # Коэффициент радиального зазора
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# Диаметры вершин зубьев [мм]
# шестерни | колеса
d_a1 := d_1 + 2*m*(h_a + x_1 - Δy) = 74
d_a2 := d_2 + 2*m*(h_a + x_2 - Δy) = 294
# Диаметры впадин зубьев [мм]
# шестерни | колеса
d_f1 := d_1 - 2*m*(h_a + c_z - x_1) = 65
d_f2 := d_2 - 2*m*(h_a + c_z - x_2) = 285
# Шестерня | Колесо
# Число зубьев z:
z_1 = 35
z_2 = 145
# Модуль m:
m = 2
# Фактическое передаточное число u=z_2/z_1:
z_2/z_1 = 4.14286
# Делительный диаметр d:
d_1 = 70
d_2 = 290
# Диаметр вершин d_a:
d_a1 = 74
d_a2 = 294
# Диаметр впадин d_f:
d_f1 = 65
d_f2 = 285
# Коэффициент смещения:
x_1 = 0
x_2 = 0
# Межосевое расстояние
a_w = 180
# Ширена
b_w1 = 28
b_w2 = 20
# Проектирование зубчатой конической передачи
n_1 = 950
T_1 = 39.1079
n_2 = 211.111
T_2 = 164.186
# Для изготовления колеса и шестерни выбираем тот же материал что и для предыдущей передачи – сталь 20Х
HRC_min = 56  # Твердость поверхности
HRC_max = 63
HRC_avr = 59.5
σ_В = 650  # Предел прочности [МПа]
σ_Т = 400  # Предел текучести [МПа]
# Расчет напряжений
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# Твердость колеса должна быть меньше чем твердость шестерни
# Для шестерни
HRC_n1 := 60
HB_n1 := 650
# Для колеса
HRC_n2 := 58
HB_n2 := 620
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σ_Hlim1n := 23*HRC_n1 = 1380  # Предел контактной выносливости для шестерни [МПа]
σ_Hlim2n := 23*HRC_n2 = 1334  # Предел контактной выносливости для колеса [МПа]
S_Hn := 1.2  # Коэффициент безопасности
N_HG1n := 30*HB_n1^2.4 = 169088204  # Базовое число циклов
N_HG2n := 30*HB_n2^2.4 = 150959799
t_р.п = 10710  # Ресурс рабочей передачи в часах
N_HE1n := μ_H*60*c*n_1*t_р.п = 109884600  # Эквивалентное число циклов
N_HE2n := μ_H*60*c*n_2*t_р.п = 24418800
Z_Nn1 := nthroot(N_HG1n/N_HE1n, 6) = 1.07447  # Коэффициенты безопасности
Z_Nn2 := nthroot(N_HG2n/N_HE2n, 6) = 1.35474
σ_H1n := σ_Hlim1n/S_Hn*Z_Nn1 = 1235.65  # Допускаемое контактное напряжение
σ_H2n := σ_Hlim2n/S_Hn*Z_Nn2 = 1506.02
σ_Hmn := (σ_H1n + σ_H2n)/2 = 1370.83
σ_Hnn := 1.15*σ_H1n = 1420.99  # Предельное контактное напряжение
σ_Hn := σ_Hmn = 1370.83  # Итоговое
σ_Flim1n := 800  # Предел выносливости по напряжению изгиба
σ_Flim2n := 800
m_F = 9
N_FG = 4000000  # базовое число циклов для всех сталей
μ_F1 = 0.036  # коэффициент режима работы (напряжение изгиба)
N_FE1n := μ_F1*60*c*n_1*t_р.п = 21976920  # Эквивалентное число циклов перемены напряжений
N_FE2n := μ_F1*60*c*n_2*t_р.п = 4883760
Y_N1n := nthroot(N_FG/N_FE1n, m_F) = 0.827538
Y_N1n := 1  # Коэффициент долговечности
Y_N2n := nthroot(N_FG/N_FE2n, m_F) = 0.978064
Y_N2n := 1
S_Fn := 1.55  # Коэффициент безопасности
Y_An := 1  # Коэффициент учитывающий влияние 2 сторонней нагрузки
σ_F1n := σ_Flim1n/S_Fn*Y_An*Y_N1n = 516.129  # Допускаемое контактное напряжение
σ_F2n := σ_Flim2n/S_Fn*Y_An*Y_N2n = 516.129
σ_Hmax1n := 44*HRC_n1 = 2640  # Максимальные допускаемы контактные напряжения
σ_Hmax2n := 44*HRC_n2 = 2552
Y_Nmaxn := 2.5
K_stn := 1.2
σ_Fmax1n := 0.5*σ_Flim1n*Y_Nmaxn*K_stn = 1200  # Максимальное допускаемое напряжение изгиба
σ_Fmax2n := 0.5*σ_Flim2n*Y_Nmaxn*K_stn = 1200
# Проектный расчет конической передачи
# Тип зубьев - круговые
E_npn := 2.1*10^5  # Приведенный модуль упругости
T_2 = 164.186  # Момент на тихоходном валу
u_з.п. = 4.5  # Передаточное число передачи
σ_Hn = 1370.83  # Итоговое контактное напряжение
K_be := 0.285  # Коэффициент концентрации нагрузки
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S_be := K_be*u_з.п./(2 - K_be) = 0.747813
K_Hβn := 1.11  # Коэффициент концентрации нагрузки
θ_Hn := 0.81 + 0.15*u_з.п. = 1.485  # Опытный коэффициент характеризующий понижение прочности зубьев  # Выбираем роликовые подшипники так что (1р)
d'_e2 := 17*nthroot(E_npn*T_2*u_з.п.*K_Hβn/(θ_Hn*σ_Hn^2*(1 - K_be)*K_be), 3) = 114.164  # Внешний диаметр делительной окружности колеса предварительно
R'_e := 0.5*d'_e2*sqrt(u_з.п.^2 + 1)/u_з.п. = 58.4746  # Внешнее конусное расстояние предварительно
b'_w := K_be*R'_e = 16.6653  # Ширена колеса предварительно
δ_2 := atan(u_з.п.) = 1.35213  # рад
180/π*δ_2 = 77.4712  # Углы делительных конусов
δ_1 := π/2 - δ_2 = 0.218669  # рад
180/π*δ_1 = 12.5288
d'_e1 := d'_e2/u_з.п. = 25.3698  # Внешний делительный диаметр шестерни предварительно
R'_m := R'_e - 0.5*b'_w = 50.142  # Среднее конусное расстояние предварительно
d'_m1 := d'_e1*R'_m/R'_e = 21.7546  # Средний делительный диаметр шестерни предварительно
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z'_1 := 11  # Число зубьев предварительно
z_1n := z'_1 = 11
z_1n := 18
m'_tm := d'_m1/z_1n = 1.20859  # Торцовый модуль в среднем сечении
β_n := 28°
m'_nm := m'_tm*cos(β_n) = 1.06712
m_nm := 2
m_tm := m_nm/cos(β_n) = 2.26514
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z_1n := d'_m1/m_tm = 9.6041
z_1n := 20
z_2n := z_1n*u_з.п. = 90
z_2n := 90
u_з.п. := z_2n/z_1n = 4.5
# Корректировка:
δ_2 := atan(u_з.п.) = 1.35213  # рад
180/π*δ_2 = 77.4712  # Углы делительных конусов
δ_1 := π/2 - δ_2 = 0.218669  # рад
180/π*δ_1 = 12.5288
d_m1 := m_tm*z_1n = 45.3028  # Средние делительные диаметры
d_m2 := m_tm*z_2n = 203.863
# Проверочный расчет конической передачи
K_Hβn = 1.11
K_Hvn := (1.07 + 1.14)/2 = 1.105
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K_Hn := K_Hβn*K_Hvn = 1.22655
v_n := π*d_m1*10^-3*n_1/60 = 2.25345
b'_w = 16.6653
b_wn := 20
σ_Hn = 1370.83
σ_Hn1 := 1.18*sqrt(E_npn*T_1*10^3*K_Hn/(θ_Hn*d_m1^2*b_wn*sin(2*a_w))*(sqrt(u_з.п.^2 + 1)/u_з.п.)) = 495.8
(σ_Hn - σ_Hn1)/σ_Hn*100 = 63.8322  # Недогрузка
K_Fβn := 1 + 1.5*(K_Hβn - 1) = 1.165
K_Fvn := (1.01 + 1.02)/2 = 1.015
K_Fn := K_Fβn*K_Fvn = 1.18248
θ_Fn := 0.65 + 0.11*u_з.п. = 1.145
z_v1n := z_1n/(cos((δ_1*180/π)°)*cos(β_n)) = 23.204
z_v2n := z_2n/(cos((δ_2*180/π)°)*cos(β_n)) = 469.88
x_n1 := 2*(1 - 1/u_з.п.^2)*sqrt(cos(β_n)^3/z_1n) = 0.352714
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x_n2 := -x_n1 = -0.352714
x_n1 + x_n2 = 0
Y_FS1n := 3.68
Y_FS2n := 3.78
σ_F1n/Y_FS1n = 140.252
σ_F2n/Y_FS2n = 136.542
# Дальнейший расчет ведем по колесу тк это соотношение меньше
F_tn := 2*T_1/(d_m1*10^-3) = 1726.51
a_wn := 20°
F_r1 := F_tn/cos(β_n)*(tan(a_wn)*cos(δ_1) + sin(β_n)*sin(δ_1)) = 893.9
F_a1 := F_tn/cos(β_n)*(tan(a_wn)*cos(δ_1) + sin(β_n)*cos(δ_1)) = 1590.9
m_nm = 2  # Модуль
σ_F1n = 516.129
σ_F2n = 516.129
σ_Fn := Y_FS2n*F_tn*K_Fn/(θ_Fn*b_wn*m_nm) = 168.495
K_П = 2
σ_Hmax1n = 2640
σ_Hmax2n = 2552
σ_Hmaxn := σ_Hn1*sqrt(K_П) = 701.167
σ_Fmax1n = 1200
σ_Fmax1n = 1200
σ_Fmaxn := σ_Fn*K_П = 336.99
# Расчет геометрии передачи
R_m := d_m1/(2*sin(δ_1)) = 104.418
R_e := R_m + 0.5*b_w = 114.418
d_e1 := d_m1*R_e/R_m = 49.6414
m_te := d_e1/z_1n = 2.48207
d_e2 := m_te*z_2n = 223.386
# Шестерня | Колесо
# Число зубьев
z_1n = 20
z_2n = 90
# Модуль средний нормальный
m_nm = 2
# Модуль средний окружной
m_tm = 2.26514
# Модуль внешний окружной
m_te = 2.48207
# Фактическое передаточное число
z_2n/z_1n = 4.5
# Среднее конусное расстояние
R_m = 104.418
# Внешнее конусное расстояние
R_e = 114.418
# Углы делительных конусов
δ_1*180/π = 12.5288
δ_2*180/π = 77.4712
# Угол наклона линии зуба
β_n*180/π = 28
# Средний делительный диаметр
d_m1 = 45.3028
d_m2 = 203.863
# Внешний делительный диаметр
d_e1 = 49.6414
d_e2 = 223.386
# Ширена зубчатого венца
b_w = 20
# Коэффициент смещения
x_n1 = 0.352714
x_n2 = -0.352714
# Роликовые подшипники
# Проектирование валов
# Табл(8.1)
τ := 12.5
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d_2cp := nthroot(T_1*10^3/(0.2*τ), 3) = 25.0097
d_2cp := 26
# Вал (ll) [мм]
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τ := 14.5
d_3cp := nthroot(T_2*10^3/(0.2*τ), 3) = 38.3983
d_3cp := 40  # Вал (lll) [мм]
d_4cp := nthroot(T_РО*10^3/(0.2*τ), 3) = 59.8622
d_4cp := 60  # Вал (lV) [мм]
# Проектирование шпонок
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# Для вала (ll)
# Длина
l_p := 20
# Высота
h := 7
# Ширена
b := 8
# Глубина пазов
# На валу
h_v := 4
# На втулке
h_k := 3.3
# Радиус закругления | от 0.16 до 0.25
σ_cm1 := 4*T_1*10^3/(h*l_p*d_2cp) = 42.9757  # В пределе нормы
# Для вала (lll)
# Длина
l_p := 20
# Высота
h := 8
# Ширена
b := 12
# Глубина пазов
# На валу
h_v := 5
# На втулке
h_k := 3.3
# Радиус закругления | от 0.25 до 0.4
σ_cm1 := 4*T_2*10^3/(h*l_p*d_3cp) = 102.616  # В пределе нормы
# Для вала (lV)
# Длина
l_p := 32
# Высота
h := 11
# Ширена
b := 18
# Глубина пазов
# На валу
h_v := 7
# На втулке
h_k := 4.4
# Радиус закругления | от 0.16 до 0.25
σ_cm1 := 4*T_РО*10^3/(h*l_p*d_4cp) = 117.821  # В пределе нормы
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