A1 := [1, 3, 0, 0; 9, -7, -10, 0; 0, -7, -10, -3; 0, 0, 3, 1]
Z1 := [-12; -74; 10; -1]
x := -9
y := -1
z := 0
k := -1
lsolve(A1, Z1) = [-9; -1; 0; -1]
K1 := [x; y; z; k]
A1*K1 = [-12; -74; 10; -1]
ORIGIN := 1
A := [0; 9; -7; 3]
B := [1; -7; -10; 1]
C := [3; -10; -3; 0]
D := [-12; -74; 10; -1]
TDMA :=
    n ← last(B)
    α[1] ← -C[1]/B[1]
    β[1] ← D[1]/B[1]
    for i ∈ 2 .. n - 1
        α[i] ← -C[i]/(α[i - 1]*A[i] + B[i])
        β[i] ← (D[i] - A[i]*β[i - 1])/(α[i - 1]*A[i] + B[i])
    β[n] ← (D[n] - A[n]*β[n - 1])/(α[n - 1]*A[n] + B[n])
    x[n] ← β[n]
    for i ∈ n - 1, n - 2 .. 1
        x[i] ← α[i]*x[i + 1] + β[i]
    x
ans := TDMA
ans = [-9; -1; 0; -1]
A1*ans = [-12; -74; 10; -1]
Z1 = [-12; -74; 10; -1]
