ORIGIN := 1
L := 0.015
a := 0.01648*10^-3
T_left := 28
T_right := -5
T_init := -10
N_x := 101
N_τ := 101
Δx := L/(N_x - 1)
Δτ := 0.5*Δx^2/(2*a)
TEXP :=
    T[1, 1] ← T_left
    for i ∈ 1, 2 .. N_τ - 1
        T[i, 1] ← T_init
    T[N_x, 1] ← T_right
    for n ∈ 1, 2 .. N_x - 1
        T[1, n + 1] ← T_left
        for i ∈ 2, 3 .. N_x - 1
            T[i, n + 1] ← T[i, n] + a*Δτ/Δx^2*(T[i - 1, n] - 2*T[i, n] + T[i + 1, n])
        T[N_x, n + 1] ← T_right
    T
T := TEXP
T =  # no stored result
i := 1 .. N_x
x[i] := 1000*(i - 1)*L/(N_x - 1)
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