ORIGIN := 1
L := 0.01
a := 0.01648*10^-3
T_left := 100
T_right := 20
T_init := 20
N_x := 101
N_τ := 101
Δx := L/(N_x - 1)
Δτ := 0.5*Δx^2/(2*a)
J := a*Δτ/Δx^2
TDMA(A, B, C, D) :=
    n ← last(B)
    α[1] ← -C[1]/B[1]
    β[1] ← D[1]/B[1]
    for i ∈ 2, 3 .. n - 1
        α[i] ← -C[i]/(α[i - 1]*A[i] + B[i])
        β[i] ← (D[i] - A[i]*β[i - 1])/(α[i - 1]*A[i] + B[i])
    β[n] ← (D[n] - A[n]*β[n - 1])/(α[n - 1]*A[n] + B[n])
    x[n] ← β[n]
    for i ∈ n - 1, n - 2 .. 1
        x[i] ← α[i]*x[i + 1] + β[i]
    x
MA :=
    A[1] ← 0
    for i ∈ 2, 3 .. N_x - 2
        A[i] ← -J
    A
MB :=
    for i ∈ 1, 2 .. N_x - 2
        B[i] ← 1 + 2*J
    B
MC :=
    C[N_x - 2] ← 0
    for i ∈ 1, 2 .. N_x - 3
        C[i] ← -J
    C
MD(T) :=
    D[1] ← T[2] + J*T[1]
    D[N_x - 2] ← T[N_x - 1] + J*T[N_x]
    for i ∈ 2, 3 .. N_x - 3
        D[i] ← T[i + 1]
    D
TIMP :=
    T[1, 1] ← T_left
    for i ∈ 2, 3 .. N_x - 1
        T[i, 1] ← T_init
    T[N_x, 1] ← T_right
    A ← MA
    B ← MB
    C ← MC
    for n ∈ 2, 3 .. N_τ
        D ← MD(T[:, n - 1])
        T_n ← TDMA(A, B, C, D)
        T[1, n] ← T_left
        for i ∈ 1, 2 .. N_x - 2
            T[i + 1, n] ← T_n[i]
        T[N_x, n] ← T_right
    T
T := TIMP
T =  # no stored result
i := 1 .. N_x
x[i] := 1000*(i - 1)*L/(N_x - 1)
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