ORIGIN := 1
α := 30
λ := 56
a := 0.01648*10^-3
T_left := 200
T_right := 100
T_init := 50
T_env := 20
N_x := 21
N_y := 11
N_τ := 101
L_x := 0.033
L_y := 0.012
Δy := L_y/(N_y - 1)
Δx := L_x/(N_x - 1)
Δτ := 0.6*1/(2*a*(1/Δx^2 + 1/Δy^2))
BIC :=
    for j ∈ 1, 2 .. N_y
        T_y[j] ← T_left
    T_x[1] ← T_y
    for i ∈ 2, 3 .. N_x - 1
        for j ∈ 1, 2 .. N_y
            T_y[j] ← T_init
        T_x[i] ← T_y
    for j ∈ 1 .. N_y
        T_y[j] ← T_right
    T_x[N_x] ← T_y
    T_x
TEXP :=
    T[1] ← BIC
    for n ∈ 1, 2 .. N_τ - 1
        for j ∈ 1, 2 .. N_y
            T_y[j] ← T_left
        T_x[1] ← T_y
        for i ∈ 2, 3 .. N_x - 1
            T_y[1] ← T[n][i][1] + 2*a*Δτ/Δy^2*(T[n][i][2] - T[n][i][1]) + a*Δτ/Δx^2*(T[n][i - 1][1] - 2*T[n][i][1] + T[n][i + 1][1]) - 2*a*Δτ/Δy*α/λ*(T[n][i][1] - T_env)
            for j ∈ 2, 3 .. N_y - 1
                T_y[j] ← T[n][i][j] + a*Δτ*((T[n][i - 1][j] - 2*T[n][i][j] + T[n][i + 1][j])/Δx^2 + (T[n][i][j - 1] - 2*T[n][i][j] + T[n][i][j + 1])/Δy^2)
            T_y[N_y] ← T[n][i][N_y] + 2*a*Δτ/Δy^2*(T[n][i][N_y - 1] - T[n][i][N_y]) + a*Δτ/Δx^2*(T[n][i - 1][N_y] - 2*T[n][i][N_y] + T[n][i + 1][N_y]) - 2*a*Δτ/Δy*α/λ*(T[n][i][N_y] - T_env)
            T_x[i] ← T_y
        for j ∈ 1 .. N_y
            T_y[j] ← T_right
        T_x[N_x] ← T_y
        T[n + 1] ← T_x
    T
T := TEXP
T[50][7] = [59.2521; 59.2746; 59.2916; 59.3035; 59.3105; 59.3128; 59.3105; 59.3035; 59.2916; 59.2746; 59.2521]
