z(x, y) := -25/29*x - 10/29*y + 275/29
g(x, y) := x^2 + y^2 + 8*x - 6*y - 4
L(x, y, λ) := z(x, y) + λ*g(x, y)
solve block
    # guess values
    x := 0
    y := 0
    λ := 0
    # constraints
    ∂/∂x(L(x, y, λ)) == 0
    ∂/∂y(L(x, y, λ)) == 0
    g(x, y) == 0
    # solver
    point := Find(x, y, λ) = [1; 5; 0.0862069]
end solve block
x := point[0] = 1
y := point[1] = 5
z(x, y) = 6.89655
g(x, y) = -7.10543e-15
solve block
    # guess values
    x := -5
    y := 0
    λ := 0.1
    # constraints
    ∂/∂x(L(x, y, λ)) == 0
    ∂/∂y(L(x, y, λ)) == 0
    g(x, y) == 0
    # solver
    point := Find(x, y, λ) = [-9; 1; -0.0862069]
end solve block
x := point[0] = -9
y := point[1] = 1
z(x, y) = 16.8966
g(x, y) = 1.59872e-14
