F := 4.9  # Тяговая сила ленты [кН]
V := 0.58  # Скорость грузовой цепи [м/с]
t := 80  # Шаг грузовой цепи [мм]
z := 8  # Число зубьев звездочки
L_r := 6  # Срок службы привода [лет]
L_с := 2  # Сменность работы
t_c := 8  # Продолжительность смены [ч]
# Легкий | Режим работы
# МЕТОДИЧКА С ТЗ (teh_zadanie)
# Расчет параметров двигателя
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N_р.м. := F*V = 2.842  # Требуемая мощность рабочей машины
η_з.п. := (0.93 + 0.95)/2  # КПД закрытой передачи;
η_о.п. := (0.92 + 0.94)/2  # КПД открытой передачи
η_м. := 0.98  # КПД муфты
η_п.к. := (0.99 + 0.995)/2  # КПД одной пары подшипников качения
η := η_з.п.*η_о.п.*η_м.*η_п.к.^3 = 0.837584  # Общий КПД привода
N_р.д. := N_р.м./η = 3.39309  # Расчетная мощность двигателя [кВт]
# Выбранный двигатель:
# ТИП : АИР112МВ6
P := 4  # Номинальная мощность [кВт]
n_ном := 950  # Номинальная частота вращения [об/мин]
η_д := 83.4  # КПД [%]
# Определение передаточного отношения привода
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n_р.о. := 60*1000*V/(z*t) = 54.375  # Частота вращения приводного вала рабочей машины [об/мин]
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u := n_ном/n_р.о. = 17.4713  # Передаточное отношение привода
u_з.п. := 4  # Передаточное отношение закрытой передачи
u_о.п. := u/u_з.п. = 4.36782  # Передаточное отношение открытой передачи
# Кинематический расчет привода
# Определение силовых и кинематических параметров привода:
# (Б) - быстроходный вал двигателя
# (Т) - тихоходный вал двигателя
# (PO) - вал рабочего органа
# Мощность N, кВт
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# Двигателя
N_д := P = 4
Б
N_1 := N_д*η_м.*η_п.к. = 3.8906
Т
N_2 := N_1*η_з.п.*η_п.к. = 3.62974
РО
N_РО := N_2*η_о.п.*η_п.к. = 3.35034
# Частота вращения n, мин^-1
# Двигателя
n_ном = 950
Б
n_1 := n_ном = 950
Т
n_2 := n_1/u_з.п. = 237.5
РО
n_РО := n_2/u_о.п. = 54.375
# Угловая скорость ω, c^-^1
# Двигателя
ω_ном := π*n_ном/30 = 99.4838
Б
ω_1 := ω_ном = 99.4838
Т
ω_2 := ω_1/u_з.п. = 24.8709
РО
ω_РО := ω_2/u_о.п. = 5.69414
# Вращающий момент T, Н*м
# Двигателя
T_д := N_д*10^3/ω_ном = 40.2076
Б
T_1 := T_д*η_м.*η_п.к. = 39.1079
Т
T_2 := T_1*u_з.п.*η_з.п.*η_п.к. = 145.943
РО
T_РО := T_2*u_о.п.*η_о.п.*η_п.к. = 588.384
# МЕТОДИЧКА ЛУСТЕНКОВА(Detali_mashin)
# Проектирование зубчатой цилиндрической передачи
n_2 = 237.5
T_2 = 145.943  # Шестерня
# Тк в схеме цилиндрическая шестерня стоит последней перед рабочим механизмом то нужно брать именно эти параметры для расчета (не n_1и n_2)
n_РО = 54.375
T_РО = 588.384  # Колесо
# Для изготовления колеса и шестерни выбираем материал – сталь 20Х
# Табл(2.3)
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HRC_min := 56
HRC_max := 63
HRC_avr := (HRC_min + HRC_max)/2 = 59.5  # Твердость поверхности (по Роквеллу)
σ_В := 650  # Предел прочности [МПа]
σ_Т := 400  # Предел текучести [МПа]
# Расчет напряжений
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# Твердость колеса должна быть меньше чем твердость шестерни
# Шестерня | Колесо
HRC_m1 := 60
HRC_m2 := 58
HB_m1 := 650
HB_m2 := 620
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# Табл(2.4) | Рис(2.3)
σ_Hlim1 := 23*HRC_m1 = 1380  # Предел контактной выносливости для шестерни [МПа]
σ_Hlim2 := 23*HRC_m2 = 1334  # Предел контактной выносливости для колеса [МПа]
# Расчет коэффициента долговечности
S_H := 1.2  # Коэффициент безопасности(1.2 при цементации)
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N_HG1 := 30*HB_m1^2.4 = 169088204  # Базовое число циклов шестерни
N_HG2 := 30*HB_m2^2.4 = 150959799  # Колеса
K_D := 255  # Количество рабочих дней в году
L_r = 6  # Срок службы
L_с = 2  # Количество смен
t_c = 8  # Количество часов в смене
t_р.п := L_r*K_D*L_с*t_c = 24480  # Ресурс работы передачи в часах
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μ_H := 0.125
# Коэффициент режима работы
# (по условию режим работы легкий)
c := 1  # Кол. колес находящихся в зацеплении с данным  # Табл(2.5)
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N_НЕ1 := μ_H*60*c*n_2*t_р.п = 43605000  # Эквивалентное число циклов шестерни
N_НЕ2 := μ_H*60*c*n_р.о.*t_р.п = 9983250  # Колеса
Z_N1 := nthroot(N_HG1/N_НЕ1, 6) = 1.25342  # Коэффициент долговечности шестерни
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Z_N2 := nthroot(N_HG2/N_НЕ2, 6) = 1.57253  # Колеса
σ_H1 := σ_Hlim1/S_H*Z_N1 = 1441.43  # Допускаемое контактное напряжение шестерни
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σ_H2 := σ_Hlim2/S_H*Z_N2 = 1748.13  # Колеса
σ_Hm := (σ_H1 + σ_H2)/2 = 1594.78  # Среднее допускаемое напряжение
σ_Hmin := σ_H1 = 1441.43  # Меньшее из σ_H1 и σ_H2
σ_Hп := 1.25*σ_Hmin = 1801.79  # Предельные контактные напряжения
σ_H := σ_Hm = 1594.78  # Окончательное (меньшее из σ_Hm и σ_Hп)
# Расчет допускаемого напряжения изгиба
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σ_Flim1 := 800  # Предел выносливости по напряжению изгиба Шестерни
σ_Flim2 := 800  # Колеса  # термообработка - цементация Табл(2.6)
m_F := 9
N_FG := 4*10^6  # базовое число циклов для всех сталей
μ_F1 := 0.016  # Табл(2.5)  # коэффициент режима работы (напряжение изгиба)
N_FE1 := μ_F1*60*c*n_2*t_р.п = 5581440  # Эквивалентное число циклов Шестерни
N_FE2 := μ_F1*60*c*n_РО*t_р.п = 1277856  # Колеса
t_р.п = 24480
n_2 = 237.5
n_РО = 54.375
Y_N1 := nthroot(N_FG/N_FE1, m_F) = 0.96366
Y_N1 := 1
# Коэффициент долговечности
# Шестерни
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Y_N2 := nthroot(N_FG/N_FE2, m_F) = 1.13518  # Колеса
S_F := 1.55  # Коэффициент безопасности
Y_A := 1  # Коэффициент влияния 2-сторонней нагрузки
# Допускаемое напряжение изгиба [МПа]
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# шестерни | колеса
σ_F1 := σ_Flim1/S_F*Y_A*Y_N1 = 516.129
σ_F2 := σ_Flim2/S_F*Y_A*Y_N2 = 585.899
# Максимальные допускаемые контактные напряжения [МПа]
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# шестерни | колеса
σ_Hmax1 := 44*HRC_m1 = 2640
σ_Hmax2 := 44*HRC_m2 = 2552
# Максимальные допускаемые напряжения изгиба
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Y_Nmax := 2.5  # коэффициент долговечности
K_st := 1.2  # коэффициент учета частоты приложения пиковой нагрузки
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σ_Fmax1 := 0.5*σ_Flim1*Y_Nmax*K_st = 1200  # шестерни
σ_Fmax2 := 0.5*σ_Flim2*Y_Nmax*K_st = 1200  # колеса
# Проектный расчет цилиндрической прямозубой передачи
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# Формула(2.48)
u_о.п. = 4.36782  # Передаточное число требуемое от передачи
T_РО = 588.384  # Момент требуемый на колесе[Н*м]
E_np := 2.1*10^5  # Приведенный модуль упругости [МПа]
σ_H = 1594.78  # Контактное напряжение
Ψ_ba := (0.15 + 0.2)/2 = 0.175  # Коэффициент ширины колеса относительно межосевого расстояния
Ψ_bdmax := (0.45 + 0.55)/2 = 0.5  # Табл(2.7)
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# Формула(2.17)
Ψ_bd := 0.5*Ψ_ba*(u_о.п. + 1) = 0.469684  # Коэффициент ширины колеса относительно делительного диаметра
# Рис(2.4)
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K_Hβ := 1.04
C := 0.06  # Коэффициент твердости и типа зубьев
n_ст := 9  # Степень точности изготовления колес (5-9)
# Формула(2.32)
# Допускаемое контактное напряжение
K_Hα := 1 + C*(n_ст - 5) = 1.24
# Межосевое расстояние[мм]
a_w := 0.85*(u_о.п. + 1)*nthroot(E_np*T_РО*10^3*K_Hα*K_Hβ/(σ_H^2*u_о.п.*Ψ_ba), 3) = 198.195
a_w := 200  # Округляем межосевое расстояние до ближайшего стандартного Табл(2.2)
b_w := a_w*Ψ_ba = 35  # Ширена зубчатых колес по формуле(2.49)
b_w1 := b_w + 7 = 42  # Ширена Шестерни (добавляется 5-10 мм)
b_w2 := b_w = 35  # Ширена Колеса
Ψ_m := (20 + 15)/2 = 17.5  # Табл(2.8)
m := b_w/Ψ_m = 2  # Модуль передачи по формуле(2.19)(принимаем стандартный модуль 2)
m := 2
z_Δ := 2*a_w/m = 200  # Суммарное количество зубьев по формуле(2.50)
z_1 := z_Δ/(u_о.п. + 1) = 37.2591  # Количество зубьев Шестерни
z_2 := z_Δ - z_1 = 162.741  # Количество зубьев Колеса
z_1 := 37
z_2 := 163  # Округляем
# Нахождение погрешности
u_о.п. = 4.36782
z_2/z_1 = 4.40541
z_2/z_1*(u_о.п./100)^-1 = 100.861  # Погрешность <5% так что все хорошо
d_1 := m*z_1 = 74  # Делительный диаметр шестерни
d_2 := m*z_2 = 326  # Делительный диаметр колеса
# Проверочные расчеты цилиндрической прямозубой передачи
β := 0  # Угол наклона зубьев =0 т.к. передача прямозубая
ε_a := (0.95 - 1.6*(1/z_1 + 1/z_2))*(1 + cos(β))*cos(β) = 1.79388  # Коэффициент перекрытия по формуле(2.28)
ε_β := b_w*sin(β)/(π*m) = 0  # Коэффициент осевого перекрытия по формуле(2.29)
Z_Hβ := sqrt(cos(β)^2/ε_a) = 0.746626  # По формуле(2.30)
n_ст = 9  # Степень точности изготовления колес (5-9)
C = 0.06  # Коэффициент твердости и типа зубьев
K_Ha := 1 + C*(n_ст - 5) = 1.24  # Коэффициент распределения нагрузки между зубьями по формуле(2.32)
v := π*d_1*10^-3*n_1/60 = 3.6809  # Окружная скорость[м/с] по формуле(2.33)
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K_Hv := 1.5  # По табл(В.1)
K_H := K_Ha*K_Hβ*K_Hv = 1.9344  # Коэффициент расчетной нагрузки по формуле(2.31)
E_np = 210000
# Шестерни | Колеса
# Изначально получилась недогрузка 51% так что можно уменьшить ширену шестерен
b_w := 16
b_w1 = 42
b_w2 = 35
b_w1 := b_w + 8 = 24
b_w2 := b_w = 16
σ_H = 1594.78  # Контактное напряжение рассчитанное до
# по формуле(2.27)
a' := 20  # Угол зацепления стандартный 20 под табл(2.2)
σ_H.пр := 1.18*Z_Hβ + sqrt(E_np*T_2*10^3*K_H/(d_1^2*b_w*sin(2*a'°))*((u_о.п. + 1)/u_о.п.)) = 1138.29
Δ_σH := (σ_H.пр - σ_H)/σ_H*100 = -28.6242  # Перегрузка(недогрузка)
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# по формуле(2.1)стр 33
F_t := 2*T_2/(d_1*10^-3) = 3944.4
x_1 := 0
x_2 := 0
F_r := F_t*tan(a'°)/cos(β) = 1435.64
F_a := F_t*tan(β) = 0
z_v1 := z_1/cos(β)^3 = 37
z_v2 := z_2/cos(β)^3 = 163
# шестерня | колесо
Y_FS1 := 3.82
Y_FS2 := 3.75  # По рис(2.6)
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σ_F1/Y_FS1 = 135.112
σ_F2/Y_FS2 = 156.24
# Дальнейший расчет ведем по шестерне тк это соотношение меньше
σ_F := σ_F1 = 516.129
Y_FS := Y_FS1 = 3.82
Y_β := 1 - β°/100 = 1
Y_Fβ := Y_β/ε_a = 0.55745
K_Fa := K_Ha = 1.24
K_Fβ := 1.04
Ψ_bd = 0.469684  # По рис(2.7)
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K_Fv := K_Hv = 1.5
K_F := K_Fa*K_Fβ*K_Fv = 1.9344
σ_F = 516.129  # Рассчитанное до напряжение изгиба
σ_F.пр := F_t*K_F*Y_FS*Y_Fβ/(b_w*m) = 507.746  # Напряжение изгиба
Δ_σF := (σ_F.пр - σ_F)/σ_F*100 = -1.62413  # Небольшая недогрузка так что все хорошо
K_П := 2  # Допускаемая перегрузка передачи
σ_Hmax1 = 2640
σ_Hmax2 = 2552
σ_Hmax := σ_H.пр*sqrt(K_П) = 1609.78  # Т.к. меньше 2 верхних все рассчитано верно
σ_Fmax1 = 1200
σ_Fmax2 = 1200
σ_Fmax := σ_F.пр*K_П = 1015.49  # Т.к. меньше 2 верхних все рассчитано верно
# Расчет геометрии передачи и оформление результатов расчета
h_a := 1  # Коэффициент высоты головки зуба
Δy := 0  # Коэффициент уравнительного смещения
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x_1 = 0
x_2 = 0
c_z := 0.25  # Коэффициент радиального зазора
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# Диаметры вершин зубьев [мм]
# шестерни | колеса
d_a1 := d_1 + 2*m*(h_a + x_1 - Δy) = 78
d_a2 := d_2 + 2*m*(h_a + x_2 - Δy) = 330
# Диаметры впадин зубьев [мм]
# шестерни | колеса
d_f1 := d_1 - 2*m*(h_a + c_z - x_1) = 69
d_f2 := d_2 - 2*m*(h_a + c_z - x_2) = 321
# Шестерня | Колесо
# Число зубьев z:
z_1 = 37
z_2 = 163
# Модуль m:
m = 2
# Фактическое передаточное число u=z_2/z_1:
z_2/z_1 = 4.40541
# Делительный диаметр d:
d_1 = 74
d_2 = 326
# Диаметр вершин d_a:
d_a1 = 78
d_a2 = 330
# Диаметр впадин d_f:
d_f1 = 69
d_f2 = 321
# Коэффициент смещения:
x_1 = 0
x_2 = 0
# Межосевое расстояние
a_w = 200
# Проектирование зубчатой конической передачи
n_1 = 950
T_1 = 39.1079  # Ко всем повторяющимся коэффициентам в конце добавил -  _n
n_2 = 237.5
T_2 = 145.943
# Для изготовления колеса и шестерни выбираем тот же материал что и для предыдущей передачи – сталь 20Х
HRC_min = 56  # Твердость поверхности
HRC_max = 63
HRC_avr = 59.5
σ_В = 650  # Предел прочности [МПа]
σ_Т = 400  # Предел текучести [МПа]
# Расчет напряжений
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# Твердость колеса должна быть меньше чем твердость шестерни
# Для шестерни
HRC_n1 := 60
HB_n1 := 650
# Для колеса
HRC_n2 := 58
HB_n2 := 620
σ_Hlim1n := 23*HRC_n1 = 1380  # Предел контактной выносливости для шестерни [МПа]
σ_Hlim2n := 23*HRC_n2 = 1334  # Предел контактной выносливости для колеса [МПа]
# Формула по табл(8.1)
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S_Hn := 1.2  # Коэффициент безопасности
N_HG1n := 30*HB_n1^2.4 = 169088204  # Базовое число циклов Шестерни
N_HG2n := 30*HB_n2^2.4 = 150959799  # Колеса  # Формула (2.4)
t_р.п = 24480
# Ресурс рабочей передачи в часах
# (рассчитан ранее)
N_HE1n := μ_H*60*c*n_1*t_р.п = 174420000  # Эквивалентное число циклов Шестерни
N_HE2n := μ_H*60*c*n_2*t_р.п = 43605000  # Колеса  # Формула (2.7)
Z_Nn1 := nthroot(N_HG1n/N_HE1n, 6) = 0.994839  # Коэффициенты безопасности Шестерни
Z_Nn2 := nthroot(N_HG2n/N_HE2n, 6) = 1.22995  # Колеса  # Формула (2.3)
σ_H1n := σ_Hlim1n/S_Hn*Z_Nn1 = 1144.06  # Допускаемое контактное напряжение Шестерни
σ_H2n := σ_Hlim2n/S_Hn*Z_Nn2 = 1367.29  # Колеса  # Формула (2.3)
σ_Hmn := (σ_H1n + σ_H2n)/2 = 1255.68  # Среднее контактное напряжение
σ_Hnn := 1.15*σ_H1n = 1315.67  # Предельное контактное напряжение
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σ_Hn := σ_Hmn = 1255.68  # Итоговое (минимальное из σ_Hmn и σ_Hnn)
σ_Flim1n := 800  # Предел выносливости по напряжению изгиба
σ_Flim2n := 800  # Табл (2.6) для этой стали одинаковые
N_FG = 4000000  # базовое число циклов для всех сталей
m_F = 9  # Показатель степени зависящий от термообработки
# Табл (2.5)
μ_F1 = 0.016  # коэффициент режима работы (напряжение изгиба)
N_FE1n := μ_F1*60*c*n_1*t_р.п = 22325760  # Эквивалентное число циклов перемены напряжений Шестерни
N_FE2n := μ_F1*60*c*n_2*t_р.п = 5581440  # Колеса  # Формула (2.13)
Y_N1n := nthroot(N_FG/N_FE1n, m_F) = 0.826092
Y_N1n := 1  # Коэффициент долговечности Шестерни
Y_N2n := nthroot(N_FG/N_FE2n, m_F) = 0.96366
Y_N2n := 1  # Колеса  # Формула (2.12)
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S_Fn := 1.55  # Коэффициент безопасности при цементации
Y_An := 1  # Коэффициент учитывающий влияние 2 сторонней нагрузки
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σ_F1n := σ_Flim1n/S_Fn*Y_An*Y_N1n = 516.129  # Допускаемое контактное напряжение Шестерни
σ_F2n := σ_Flim2n/S_Fn*Y_An*Y_N2n = 516.129  # Колеса  # Формула (2.10)
σ_Hmax1n := 44*HRC_n1 = 2640  # Максимальные допускаемы контактные напряжения
σ_Hmax2n := 44*HRC_n2 = 2552
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Y_Nmaxn := 2.5
K_stn := 1.2
σ_Fmax1n := 0.5*σ_Flim1n*Y_Nmaxn*K_stn = 1200  # Максимальное допускаемое напряжение изгиба Шестерни
σ_Fmax2n := 0.5*σ_Flim2n*Y_Nmaxn*K_stn = 1200  # Колеса  # Формула (2.15)
# Проектный расчет конической передачи
# Тип зубьев - круговые
E_npn := 2.1*10^5  # Приведенный модуль упругости
T_2 = 145.943  # Момент на тихоходном валу
u_з.п. = 4  # Передаточное число передачи
σ_Hn = 1255.68  # Итоговое контактное напряжение
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K_be := 0.285  # Коэффициент концентрации нагрузки
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S_be := K_be*u_з.п./(2 - K_be) = 0.664723
# Формула (3.4)
# Коэффициент концентрации нагрузки
K_Hβn := 1.08
# Рис (3.2)
θ_Hn := 0.81 + 0.15*u_з.п. = 1.41  # Опытный коэффициент характеризующий понижение прочности зубьев  # Выбираем роликовые подшипники так что (1р)
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# Формула из табл (3.1)
# Формула (3.3)
d'_e2 := 17*nthroot(E_npn*T_2*u_з.п.*K_Hβn/(θ_Hn*σ_Hn^2*(1 - K_be)*K_be), 3) = 112.815  # Внешний диаметр делительной окружности колеса предварительно
# Формула (3.5)
R'_e := 0.5*d'_e2*sqrt(u_з.п.^2 + 1)/u_з.п. = 58.1437  # Внешнее конусное расстояние предварительно
b'_w := K_be*R'_e = 16.571  # Формула (3.6)
# Ширена колеса предварительно
δ_2 := atan(u_з.п.) = 1.32582  # рад
180/π*δ_2 = 75.9638  # Углы делительных конусов Колеса
δ_1 := π/2 - δ_2 = 0.244979  # рад
180/π*δ_1 = 14.0362  # Шестерни  # Формула (3.7/3.8)
d'_e1 := d'_e2/u_з.п. = 28.2038  # Формула (3.9)  # Внешний делительный диаметр шестерни предварительно
R'_m := R'_e - 0.5*b'_w = 49.8582  # Формула (3.10)  # Среднее конусное расстояние предварительно
d'_m1 := d'_e1*R'_m/R'_e = 24.1848  # Формула (3.11)  # Средний делительный диаметр шестерни предварительно
z'_1 := 12  # Рис (3.4)  # Число зубьев предварительно
u_з.п. = 4
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z_1n := z'_1 = 12  # Формула по табл(3.2)
z_1n := 18
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# Формула (3.12)
m'_tm := d'_m1/z_1n = 1.3436  # Торцовый модуль в среднем сечении
β_n := 28°  # Угол наклона зубьев
# Формула (3.13)
m'_nm := m'_tm*cos(β_n) = 1.18633  # Нормальный модуль в среднем сечении
m_nm := 2  # Ближайший стандартный модуль
m_tm := m_nm/cos(β_n) = 2.26514  # Формула (3.14)
# Торцовый модуль в среднем сечении (пересчитанный)
z_1n := d'_m1/m_tm = 10.677
z_1n := 18  # Формула (3.15)
# Количество зубьев шестерни
z_2n := z_1n*u_з.п. = 72
z_2n := 72  # Формула (3.16)
# Колеса
u_з.п. := z_2n/z_1n = 4  # Формула (3.17)
# Фактическое передаточное число
d_m1 := m_tm*z_1n = 40.7725  # Средний делительный диаметр Шестерни
d_m2 := m_tm*z_2n = 163.09  # Колеса
# Проверочный расчет конической передачи
K_Hβn := 1  # Коэффициент концентрации нагрузки (рассчитан ранее)
K_Hvn := 1.07  # Коэффициент динамической нагрузки (зависит от окружной скорости по табл(в2)
K_Hn := K_Hβn*K_Hvn = 1.07  # Коэффициент расчетной нагрузки формула(3.21)
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v_n := π*d_m1*10^-3*n_1/60 = 2.0281
# формула(3.22)
b'_w = 16.571
b_wn := 20  # Округляем ширину зубчатого венца
σ_Hn = 1255.68  # Контактное напряжение на которое рассчитана передача
# Действительное контактное напряжение
σ_Hn1 := 1.18*sqrt(E_npn*T_1*10^3*K_Hn/(θ_Hn*d_m1^2*b_wn*sin(2*a_w°))*(sqrt(u_з.п.^2 + 1)/u_з.п.)) = 646.952
# формула(3.6)
(σ_Hn - σ_Hn1)/σ_Hn*100 = 48.4779  # Недогрузка
K_Fβn := 1 + 1.5*(K_Hβn - 1) = 1  # формула(3.26)  # Коэффициент концентрации нагрузки
K_Fvn := 1.01  # по табл(в2)  # Коэффициент динамической нагрузки
K_Fn := K_Fβn*K_Fvn = 1.01  # формула(3.25)  # Коэффициент расчетной нагрузки
θ_Fn := 0.65 + 0.11*u_з.п. = 1.09  # по табл(3.1)  # Опытный коэффициент
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z_v1n := z_1n/(cos((δ_1*180/π)°)*cos(β_n)) = 21.0137  # Эквивалентное число зубьев шестерни
# формула(3.27)
z_v2n := z_2n/(cos((δ_2*180/π)°)*cos(β_n)) = 336.219  # Колеса
# формула(3.28)
x_n1 := 2*(1 - 1/u_з.п.^2)*sqrt(cos(β_n)^3/z_1n) = 0.366663  # формула(3.29)
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x_n2 := -x_n1 = -0.366663  # формула(3.30)
x_n1 + x_n2 = 0
Y_FS1n := 3.68
Y_FS2n := 3.77
σ_F1n/Y_FS1n = 140.252
σ_F2n/Y_FS2n = 136.904
# Дальнейший расчет ведем по колесу тк это соотношение меньше
# Расчет сил действующих в зацеплении: по формулам(3.2)
F_tn := 2*T_1/(d_m1*10^-3) = 1918.35
a_wn := 20°
F_r1 := F_tn/cos(β_n)*(tan(a_wn)*cos(δ_1) + sin(β_n)*sin(δ_1)) = 1014.56
F_a1 := F_tn/cos(β_n)*(tan(a_wn)*cos(δ_1) + sin(β_n)*cos(δ_1)) = 1756.72
m_nm = 2  # Модуль
σ_F1n = 516.129
σ_F2n = 516.129  # Недогрузка тк значение меньше приведенных выше
σ_Fn := Y_FS2n*F_tn*K_Fn/(θ_Fn*b_wn*m_nm) = 167.534  # по формулам(3.24)
# Напряжение изгиба
K_П = 2  # Максимальное напряжение способное пережить передача
σ_Hmax1n = 2640
σ_Hmax2n = 2552
σ_Hmaxn := σ_Hn1*sqrt(K_П) = 914.928  # Максимальное контактное напряжение данной нагрузки
σ_Fmax1n = 1200
σ_Fmax1n = 1200  # Максимальное напряжение способное пережить передача
σ_Fmaxn := σ_Fn*K_П = 335.068  # Максимальное напряжение изгиба данной нагрузки
# Расчет геометрии передачи
R_m := d_m1/(2*sin(δ_1)) = 84.0547  # Среднее конусное расстояние
R_e := R_m + 0.5*b_w = 92.0547  # Внешнее конусное расстояние
d_e1 := d_m1*R_e/R_m = 44.6531  # Внешний делительный диаметр шестерни
m_te := d_e1/z_1n = 2.48073  # Внешний окружной модуль
d_e2 := m_te*z_2n = 178.612  # Внешний делительный диаметр колеса
# Шестерня | Колесо
# Число зубьев
z_1n = 18
z_2n = 72
# Модуль средний нормальный
m_nm = 2
# Модуль средний окружной
m_tm = 2.26514
# Модуль внешний окружной
m_te = 2.48073
# Фактическое передаточное число
z_2n/z_1n = 4
# Среднее конусное расстояние
R_m = 84.0547
# Внешнее конусное расстояние
R_e = 92.0547
# Углы делительных конусов
δ_1*180/π = 14.0362
δ_2*180/π = 75.9638
# Угол наклона линии зуба
β_n*180/π = 28
# Средний делительный диаметр
d_m1 = 40.7725
d_m2 = 163.09
# Внешний делительный диаметр
d_e1 = 44.6531
d_e2 = 178.612
# Ширена зубчатого венца
b_w = 16
# Коэффициент смещения
x_n1 = 0.366663
x_n2 = -0.366663
# Роликовые подшипники
# Проектирование валов
# Табл(8.1)
τ := 12.5
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d_2cp := nthroot(T_1*10^3/(0.2*τ), 3) = 25.0097
d_2cp := 25  # Вал (ll) [мм]
τ := 14.5
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d_3cp := nthroot(T_2*10^3/(0.2*τ), 3) = 36.92
d_3cp := 28  # Вал (lll) [мм]
d_4cp := nthroot(T_РО*10^3/(0.2*τ), 3) = 58.7608
d_4cp := 60  # Вал (lV) [мм]
# Проектирование шпонок
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# Для вала (ll)
# Длина
l_p := 12
# Высота
h := 7
# Ширена
b := 8
# Глубина пазов
# На валу
h_v := 4
# На втулке
h_k := 3.3
# Радиус закругления | от 0.16 до 0.25
σ_cm1 := 4*T_1*10^3/(h*l_p*d_2cp) = 74.4912  # В пределе нормы
# Для вала (lll)
# Длина
l_p := 25
# Высота
h := 7
# Ширена
b := 8
# Глубина пазов
# На валу
h_v := 4
# На втулке
h_k := 3.3
# Радиус закругления | от 0.16 до 0.25
σ_cm1 := 4*T_2*10^3/(h*l_p*d_3cp) = 119.137  # В пределе нормы
# Для вала (lV)
# Длина
l_p := 28
# Высота
h := 11
# Ширена
b := 18
# Глубина пазов
# На валу
h_v := 7
# На втулке
h_k := 4.4
# Радиус закругления | от 0.16 до 0.25
σ_cm1 := 4*T_РО*10^3/(h*l_p*d_4cp) = 127.356  # В пределе нормы
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