F := 3200
V := 0.7
z := 9
p := 80
N_р.м. := F*V = 2240
L := 5
η_о.п. := 0.95
η_з.п. := 0.97
K_s := 2
K_D := 255
η_м. := 0.98
η_п.к. := 0.99
t_Σ := L*K_D*K_s*8 = 20400
η := η_п.к.*η_п.к.*η_п.к.*η_м.*η_о.п.*η_з.п. = 0.876248
N_р.д. := N_р.м./η = 2556.35  # Выбран двигатель АИР112МА6
n_двиг := 950
η_двиг := 79.7
P_двиг := 3000
n_р.о. := 60*1000*V/(z*p) = 58.3333
u := n_двиг/n_р.о. = 16.2857
u_о.п. := 5
N_д := 3000
u_з.п. := u/u_о.п. = 3.25714
N_1 := N_д*η_о.п.*η_п.к. = 2821.5
N_2 := N_1*η_з.п.*η_п.к. = 2709.49  # мощность
N_PO := N_2*η_м.*η_п.к. = 2628.74
n_ном := n_двиг = 950
n_1 := n_ном/u_о.п. = 190
n_2 := n_1/u_з.п. = 58.3333  # частота вращения
n_в.р.о. := n_2 = 58.3333
ω_ном := π*n_ном/30 = 99.4838
ω_1 := ω_ном/u_о.п. = 19.8968
ω_2 := ω_1/u_з.п. = 6.10865  # угловая скорость
ω_РО := ω_2 = 6.10865
T_д := N_д/ω_ном = 30.1557
T_1 := T_д*u_о.п.*η_о.п.*η_п.к. = 141.807
T_2 := T_1*u_з.п.*η_з.п.*η_п.к. = 443.549  # моменты
T_РО := T_2*η_м.*η_п.к. = 430.331
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# 1 - шестерня
# 2 - колесо
S_H := 1.2
# коэффициент безопасности
HRC_1 := 60
HB_1 := 640
HB_2 := 600
HRC_2 := 57
σ_Hlim1 := 23*HRC_1 = 1380  # Режим работы - Т
σ_Hlim2 := 23*HRC_2 = 1311
μ_H := 0.5
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N_HG1 := 30*HB_1^2.4 = 162912044
N_HG2 := 30*HB_2^2.4 = 139535353
c := 1
L := 8
K_s := 1
K_D := 255
t_Σ := L*K_D*K_s*8 = 16320
N_HE1 := μ_H*60*c*n_1*t_Σ = 93024000
N_HE2 := μ_H*60*c*n_2*t_Σ = 28560000
Z_N1 := nthroot(N_HG1/N_HE1, 6) = 1.09789
Z_N2 := nthroot(N_HG2/N_HE2, 6) = 1.30263
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σ_H1 := σ_Hlim1/S_H*Z_N1 = 1262.58
σ_H2 := σ_Hlim2/S_H*Z_N2 = 1423.12
c := 1
μ_H := 0.25
σ_Hmin :=
    if σ_H1 < σ_H2
        return σ_H1
    else
        return σ_H2
    = 1262.58
N_HE := μ_H*60*c*n_1*t_111  # error: Эта переменная не определена. Проверьте правильность установки обозначения.
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σ_Hn := 1.25*σ_Hmin = 1578.22
σ_Hm := (σ_H1 + σ_H2)/2 = 1342.85
Z_N := nthroot(N_HG/N_HE, 6)  # error: Эта переменная не определена. Проверьте правильность установки обозначения.
σ_цем := 23*HRC  # error: Эта переменная не определена. Проверьте правильность установки обозначения.
σ_H := Z_N*σ_цем/S_H  # error: Эта переменная не определена. Проверьте правильность установки обозначения.
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σ_H := if(σ_Hm < σ_Hn, σ_Hm, σ_Hn)
σ_H = 1342.85
σ_Flim1 := 800
σ_Flim2 := 800
Y_A := 1
N_FG := 4*10^6
m_F := 9
μ_F1 := 0.2
μ_F2 := 0.2
N_FE1 := μ_F1*60*c*n_1*t_Σ = 37209600
N_FE2 := μ_F2*60*c*n_2*t_Σ = 11424000
Y_N1 := nthroot(N_FG/N_FE1, m_F) = 0.78051
Y_N2 := nthroot(N_FG/N_FE2, m_F) = 0.889939
Y_N1 :=
    if Y_N1 < 1
        return 1
    else
        return Y_N1
    = 1
S_F := 1.55
Y_N2 :=
    if Y_N2 < 1
        return 1
    else
        return Y_N2
    = 1
Y_N2 = 1
Y_N1 = 1
σ_F1 := σ_Flim1/S_F*Y_A*Y_N1 = 516.129
σ_F2 := σ_Flim2/S_F*Y_A*Y_N2 = 516.129
σ_Hmax1 := 35*HRC_1 = 2100
σ_Hmax2 := 35*HRC_2 = 1995
Y_Nmax := 2.5
K_st := 1.2
σ_Fmax1 := 0.5*σ_Flim1*Y_Nmax*K_st = 1200
σ_Fmax2 := 0.5*σ_Flim2*Y_Nmax*K_st = 1200
K_d := 680
u := u_з.п.
T_1 = 141.807
# Цилиндрическая косозубая
Ψ_ba := 0.25
Ψ_bd := 0.5*Ψ_ba*(u + 1) = 0.532143  # Коэф. ширины колеса
K_Hβ := 1.05
d_1 := K_d*nthroot(T_1*K_Hβ/(σ_H^2*Ψ_bd)*((u + 1)/u), 3) = 39.9519  # Делительный диаметр шестерни
b_w := d_1*Ψ_bd = 21.2601
b_w := 30
Ψ_m := 15
b_w1 := b_w + 5 = 35
bw_2 := b_w = 30
ε_β := 1.1
m_n := b_w/Ψ_m = 2
m_n := 1
β' := asin(ε_β*π*m_n/b_w) = 0.115448
β'° := β'*180/π = 6.61468
z'_1 := d_1*cos(β')/m_n = 39.686  # число зубьев шестерни
z_1 := 49
u = 3.25714
z_2 := z_1*u = 159.6
z_2 := 160
x_1 := 0
x_2 := x_1
a'_w := m_n*(z_2 + z_1)/(2*cos(β')) = 105.2  # межосевое расстояние, мм
a_w := 110
z_2 + z_1 = 209
m_n = 1
β := acos(m_n*(z_2 + z_1)/(2*a_w)) = 0.31756  # угол наклона зубьев
β° := β*180/π = 18.1949
d_1 := m_n*z_1/cos(β) = 51.5789
d_2 := m_n*z_2/cos(β) = 168.421
# Проверочные расчеты цилиндрической косозубой
# передачи
E_пр := 2.1*10^5
C := 0.15
n_ст := 7
d_w1 := d_1
ε_a := (0.95 - 1.6*(1/z_1 + 1/z_2))*(1 + cos(β))*cos(β) = 1.68086
ε_β := b_w*sin(β)/(π*m_n) = 2.98177  # Коэффициент осевого перекрытия
Z_Hβ := sqrt(cos(β)^2/ε_a) = 0.732753
K_Ha := 1 + C*(n_ст - 5) = 1.3
v := π*d_1*n_1/(60*1000) = 0.513127
K_Hv := 1
K_H := K_Ha*K_Hβ*K_Hv = 1.365
σ_Hnew := 1.18*Z_Hβ*sqrt(E_пр*T_1*1000*K_H/(d_w1^2*b_w*sin(2*20°))*((u + 1)/u)) = 879.911
Δ_σH := (σ_Hnew - σ_H)/σ_H*100 = -34.4744
F_t := 2*T_1/(d_1*10^-3) = 5498.64
F_r := F_t*tan(20°)/cos(β) = 2106.68
F_a := F_t*tan(β) = 1807.32
z_v1 := z_1/cos(β)^3 = 57.1512
Y_FS1 := 3.73
z_v2 := z_2/cos(β)^3 = 186.616
Y_FS2 := 3.75
σ_F1/Y_FS1 = 138.372
σ_F2/Y_FS2 = 137.634
Y_FS := Y_FS1 = 3.73
σ_F := σ_F1 = 516.129
Y_β := 1 - β°/100 = 0.818051
Y_Fβ := Y_β/ε_a = 0.486686
K_Fa := K_Ha = 1.3
K_Fβ := 1.05
K_Kv := 1
σ_F = 516.129
K_F := K_Fa*K_Fβ*K_Kv = 1.365
σ_Fnew := F_t*K_F*Y_FS*Y_Fβ/(b_w*m_n) = 454.176
Δ_σF := (σ_Fnew - σ_F)/σ_F*100 = -12.0033
K_П := 2
σ_Hmax := σ_H*sqrt(K_П) = 1899.08
σ_HmaxS := 44*HRC_1 = 2640
σ_Fmax := σ_F*K_П = 1032.26
σ_Fmax1 = 1200
σ_Fmax2 = 1200
# Расчет геометрии передачи
# Диаметры вершин зубьев шестерни и колеса
Δy := 0  # передача с колесами без смещения
h_a := 1
d_a1 := d_1 + 2*m_n*(h_a + x_1 - Δy) = 53.5789
d_a2 := d_2 + 2*m_n*(h_a + x_2 - Δy) = 170.421
# Диаметры впадин зубьев шестерни и колеса
с := 0.25  # коэффициент радиального зазора
d_f1 := d_1 - 2*m_n*(h_a + с - x_1) = 49.0789
d_f2 := d_2 - 2*m_n*(h_a + с - x_2) = 165.921
table  # each column defines a variable
    Параметр | Шестерня | Колесо
    "Число зубьев z" | 49 | 160
    "Модуль m, мм" | 1 | 1
    "Фактическое передаточное число " | 3.265 | 3.265
    "Угол наклона зубьев β°" | 18.195 | 18.195
    "Делительный диаметр d, мм" | 51.579 | 168.421
    "Диаметр вершин da,мм" | 53.579 | 170.421
    "Диаметр впадин df, мм" | 49.079 | 165.921
    "Ширина зубчатого венца bw, мм" | 27 | 21
    "Коэффициент смещения x" | 0 | 0
    "Межосевое расстояние aw, мм" | 110 | 110
end table
# Проектирование тихоходного вала редуктора
τ := 15
T := T_1
d_ср := nthroot(T*1000/(0.2*τ), 3) = 36.157
d_ср := 38
F_a = 1807.32
α_w := 20°
F_t := 2*T_1/d_1*1000 = 5498.64  # окружная сила
F_r := F_t*tan(α_w)/cos(β) = 2106.68  # радиальная сила
F_a := F_t*tan(β) = 1807.32
# Изгибающий момент
M_a := F_a*d_2/2 = 152195
b_w := 27
# Сила от муфты
K_М := 125
F_M := K_М*sqrt(T) = 1488.53
d_k := 40  # диаметр в месте посадки зубчатой шестерни
b_w := b_w1 = 35  # ширина шестерни
d_б := 0  # диаметр буртика
d_п := 35  # диаметр в месте посадки подшипника  # подшипник - 46306
# B - 19
b_п := 21
l_доп := 10
d_пр1 := 37  # диаметр промежуточного учаcтка 1
l_к := b_w = 35
d_пр2 := 37  # диаметр промежуточного участка 2
l_б := l_доп
d_пр3 := 33  # диаметр промежуточного участка 3
l_м := 58
d_м := 30  # диаметр в месте посадки муфты
l_пр := 20
B := b_п
d := d_п
α := 12°
b := 12
h := 8
Шпонки
T_1 = 141.807
# На d_k - bxh = 12x8
l_p := 4*T_1*10^3/(h*180*d_k) = 9.84771
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Расчет?
l := 21
a := (B + (d + B)/2*tan(α))/2 = 13.4758  # точка приложения реакции подшипника
a_1 := b_п/2 + l_пр + 22.5 + l_б + l_к/2 = 80.5
a_2 := l_к/2 + 12.5 + l_пр + b_п/2 = 60.5  # расстояния между точками действия сил
a_3 := b_п/2 + l_пр + l_м/2 = 59.5
R_Bг := (F_t*a_1 - F_M*(a_1 + a_2 + a_3))/(a_1 + a_2) = 1022.62
R_Aг := (F_t*a_2 + F_M*a_3)/(a_1 + a_2) = 2987.49  # горизонтальная поверхность
R_Aг + R_Bг - F_t + F_M = 2.27374e-13
R_Bв := (F_r*a_1 - M_a)/(a_1 + a_2) = 123.35
R_Aв := (F_r*a_2 + M_a)/(a_1 + a_2) = 1983.33  # вертикальная поверхность
R_Bв + R_Aв - F_r = -4.54747e-13
R_A := sqrt(R_Aг^2 + R_Aв^2) = 3585.9
# Модули суммарных радиальных реакций
R_B := sqrt(R_Bг^2 + R_Bв^2) = 1030.03
M_Cг := R_Aг*a_1*10^-3 = 240.493
# моменты сил
M_Bг := F_M*a_3*10^-3 = 88.5678
M_Aг := 0
M_Bв := 0
M_Cв' := R_Aв*a_1*10^-3 = 159.658
M_Dв := 0
M_Aв := 0
M_Dг := 0
M_Bв'' := R_Bв*a_2*10^-3 = 7.46267
M_Cв := M_Cв' = 159.658
M_A := sqrt(M_Aг^2 + M_Aв^2) = 0
M_C := sqrt(M_Cг^2 + M_Cв^2) = 288.665
M_B := sqrt(M_Bг^2 + M_Bв^2) = 88.5678
M_D := sqrt(M_Dг^2 + M_Dв^2) = 0
M_u := M_C = 288.665  # опасное сечение
d := d_k = 40
σ_u := M_u*1000/(0.1*d^3) = 45.1039
T = 141.807
τ := T*1000/(0.2*d^3) = 11.0787
σ_B := 750
σ_11 := 0.4*σ_B = 300
# Пределы выносливости по напряжениям изгиба, кручения
# Предел прочности по напряжениям кручения
τ_11 := 0.2*σ_B = 150
τ_B := 0.6*σ_B = 450
σ_m := 0
σ_a := σ_u = 45.1039
τ_m := 0.5*τ = 5.53934  # амплитудные и средние составляющие действующих напряжений
τ_a := τ_m
# Коэффициент (показатель степени) в формуле для расчета масштабного
# фактора при изгибе
v_1 := 0.19 - 1.25*10^-4*σ_B = 0.09625
# При кручении
v_2 := 1.5*v_1 = 0.144375
# Масштабный фактор при изгибе
K_dσ := 0.5*(1 + (d/7.5)^(-2*v_1)) = 0.862262
# Масштабный фактор при кручении
K_dτ := 0.5*(1 + (d/7.5)^(-2*v_2)) = 0.808354
R_z1 := 3.2  # Шероховатость вала
R_z2 := 1.6  # Шероховатость колеса, подшипника и полумуфты
# Коэффициент,
# учитывающий качество (шероховатость) поверхности по изгибу
K_Fσ := 1 - 0.22*(log(σ_B/20) - 1)*log(R_z2) = 0.974222
# Коэффициент, учитывающий качество (шероховатость) поверхности
# по кручению
K_Fτ := 0.575*K_Fσ + 0.425 = 0.985178
σ_B = 750
# Случай 3
# Эффективные коэффициенты концентрации напряжений для шпоночных
# пазов
K_σ := 2
K_τ := 1.7
K_V := 1
# коэффициенты концентрации напряжений в опасном сечении
# при изгибе и кручении
K_σD := (K_σ/K_dσ + 1/K_Fσ - 1)/K_V = 2.34594
K_τD := (K_τ/K_dτ + 1/K_Fτ - 1)/K_V = 2.11809
# Коэффициенты, корректирующие влияние постоянной составляющей цик
# ла напряжений на сопротивление усталости по изгибу и кручению
Ψ_σ := 0.02 + 2*10^-4*σ_B = 0.17
Ψ_τ := 0.5*Ψ_σ = 0.085
# запасы сопротивления усталости.
# Запас сопротивления усталости при изгибе
s_σ := σ_11/(K_σD*σ_a + Ψ_σ*σ_m) = 2.83525
# Запас сопротивления усталости при кручении
s_τ := τ_11/(K_τD*τ_a + Ψ_τ*τ_m) = 12.2914
# Общий запас сопротивления усталости
s := s_σ*s_τ/sqrt(s_σ^2 + s_τ^2) = 2.7627
# Расчет вала на статическую прочность и жесткость
σ_u := σ_u*2 = 90.2077
τ := τ*2 = 22.1574
# Допускаемые значения напряжений
σ_T := 450
σ_доп := 0.8*σ_T = 360
σ_э := sqrt(σ_u^2 + 3*τ^2) = 98.032
# Момент инерции
J := π*d_k^4/64 = 125664
# Прогиб в горизонтальной плоскости от силы Ft
E := 2.1*10^5
y_Г := F_t*a_1^2*a_2^2/(3*E*J*(a_1 + a_2)) = 0.0116839
a_2 = 60.5
a_1 = 80.5
a_3 = 59.5
# Прогиб в вертикальной плоскости от силы Fr
y_В := F_r*a_1^2*a_2^2/(3*E*J*(a_1 + a_2)) = 0.00447642
# Прогиб в вертикальной плоскости от силы Fr
y_М := F_M*a_3*a_1*((a_1 + a_2)^2 - a_1^2)/(6*E*J*(a_1 + a_2)) = 0.00427958
# Суммарный максимально возможный прогиб
y := sqrt(y_Г^2 + y_В^2) + y_М = 0.0167917
0.01*m_n = 0.01
# Расчёт подшипника на прочность | гост 36307
d_n := 35  # Внутренний диаметр подшипника
D_n := 80  # Наружный диаметр
b_n := 21  # Ширина
n := n_1 = 190
C := 35000  # Динамическая грузоподъемность
F_t = 5498.64
F_r = 2106.68
C_0 := 27400  # Статическая грузоподъемность
F_a = 1807.32
F_a/C_0 = 0.0659604
e := 0.34 - (0.34 - 0.30)*(F_a/C_0 - 0.014)/(0.029 - 0.014) = 0.201439
# Осевые составляющие реакций от радиальных нагрузок
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S_A := e*R_A = 722.339
S_B := e*R_B = 207.489
X_A := F_a + S_B = 2014.8  # Режим нагрузки I
X_B := S_B = 207.489
K_E := 0.8
# Определяем средние величины реакций опор:
X_Am := K_E*X_A = 1611.84
R_Am := K_E*R_A = 2868.72
X_Bm := K_E*X_B = 165.991
R_Bm := K_E*R_B = 824.026
X_Am/C_0 = 0.0588264
e := 0.41
V := 1
X_Am/(V*R_Am) = 0.561869
X := 0.45
Y := 1.34
К_Б := 1.3
К_Т := 1
# Определяем эквивалентную динамическую нагрузку, действующую на ле
# вый, более нагруженный подшипник:
P_r := (X*V*R_Am + Y*X_Am)*К_Б*К_Т = 4486.03
P(t) := 0.9  # коэф надежности
a_1 := 1  # коэф долговечности
a_23 := 0.75
L := 60*n*t_Σ/10^6 = 186.048  # ресурс подшипника в млн
p := 3
C = 35000
C_p := P_r*nthroot(L/(a_1*a_23), p) = 28187.1
X_0 := 0.5
Y_0 := 0.47
P_0 := X_0*R_A + Y_0*X_A = 2739.91
R_A = 3585.9
P_0 := R_A = 3585.9
P_0П := 3*P_0 = 10757.7
C_0 = 27400
# Статическая грузоподъемность подшипника обеспечена.
# для быстроходного вала
# Крышка подшипника
D := 72  # Болт M8
h_1 := 8
σ_2 := 6
D_1 := D + 2.5*8 = 92
D_2 := D_1 + 2*8 = 108
# Цилиндрическая прямозубая
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β := 0
E_пр := 2.1*10^5
K_Ha := 1.25
n_cm := 7
C := 0.06
K_Ha := 1 + C*(n_cm - 5) = 1.12
# межосевое расстояние
a_w := 0.85*(u + 1)*nthroot(E_пр*T_2*10^3*K_Ha*K_Hβ/(σ_H^2*u^2*Ψ_ba), 3) = 102.763
a_w := 100
# ширина зубчатого колеса
b_w := a_w*Ψ_ba = 25
# ширина колеса
b_w2 := b_w
# ширина шестерни
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b_w1 := b_w2 + 5 = 30
Ψ_m := 20
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модуль
m := b_w/Ψ_m = 1.25
# суммарное число зубьев
z_Δ := 2*a_w/m = 160
# число зубьев шестерни и колеса
z_1 := z_Δ/(u + 1) = 37.5839
z_2 := z_Δ - z_1 = 122.416
z_1 := 38
z_2 := 123
# делительные диаметры колес
d_1 := m*z_1 = 47.5
d_2 := m*z_2 = 153.75
# Проверочные для прямозубой
# коэф. перекрытия
ε_a := (0.95 - 1.6*(1/z_1 + 1/z_2))*(1 + cos(β))*cos(β) = 1.78977
ε_β := b_w*sin(β)/(π*m_n) = 0  # Коэффициент осевого перекрытия
Z_Hβ := sqrt(cos(β)^2/ε_a) = 0.747482
# Коэф. распределения нагрузки
K_Ha := 1 + C*(n_ст - 5) = 1.12
# окружная скорость
v := π*d_1*n_1/(60*1000) = 0.472548
K_Hv := 1
# Коэф. расчетной нагрузки
K_H := K_Ha*K_Hβ*K_Hv = 1.176
# Условие прочности
σ_Hnew := 1.18*Z_Hβ*sqrt(E_пр*T_1*1000*K_H/(d_w1^2*b_w*sin(2*20°))*((u + 1)/u)) = 912.661
Δ_σH := (σ_Hnew - σ_H)/σ_H*100 = -32.0355
# Расчеты напряжения изгиба
F_t := 2*T_1/(d_1*10^-3) = 5970.82
F_r := F_t*tan(20°)/cos(β) = 2173.2
F_a := F_t*tan(β) = 0
# Коэф. формы зуба
z_v1 := z_1/cos(β)^3 = 38
Y_FS1 := 3.73
z_v2 := z_2/cos(β)^3 = 123
Y_FS2 := 3.75
σ_F1/Y_FS1 = 138.372
σ_F2/Y_FS2 = 137.634
Y_FS := Y_FS2 = 3.75
σ_F := σ_F2 = 516.129
Y_β := 1 - β°/100 = 0.818051
# Коэф. повышения прочности
Y_Fβ := Y_β/ε_a = 0.45707
# Коэф. распределения нагрузки
K_Fa := K_Ha = 1.12
K_Fβ := 1.05
K_Kv := 1
σ_F = 516.129
K_F := K_Fa*K_Fβ*K_Kv = 1.176
σ_Fnew := F_t*K_F*Y_FS*Y_Fβ/(b_w*m_n) = 481.41
Δ_σF := (σ_Fnew - σ_F)/σ_F*100 = -6.72677
K_П := 2
σ_Hmax := σ_H*sqrt(K_П) = 1899.08
σ_HmaxS := 44*HRC_1 = 2640
σ_Fmax := σ_F*K_П = 1032.26
σ_Fmax1 = 1200
# Расчет геометрии цилиндрической прямозубой передачи
# Диаметры вершин зубьев шестерни и колеса
Δy := 0  # передача с колесами без смещения
h_a := 1
x_1 = 0
x_2 = 0
d_a1 := d_1 + 2*m_n*(h_a + x_1 - Δy) = 49.5
d_a2 := d_2 + 2*m_n*(h_a + x_2 - Δy) = 155.75
# Диаметры впадин зубьев шестерни и колеса
с := 0.25  # коэффициент радиального зазора
d_f1 := d_1 - 2*m_n*(h_a + с - x_1) = 45
a_w = 100
d_f2 := d_2 - 2*m_n*(h_a + с - x_2) = 151.25
β = 0
table  # each column defines a variable
    Параметр | Шестерня | Колесо
    "Число зубьев z" | 38 | 123
    "Модуль m, мм" | 1.25 | 1.25
    "Фактическое передаточное число " | 3.237 | 3.237
    "Угол наклона зубьев β°" | 0 | 0
    "Делительный диаметр d, мм" | 47.5 | 153.75
    "Диаметр вершин da,мм" | 49.5 | 155.75
    "Диаметр впадин df, мм" | 45 | 151.25
    "Ширина зубчатого венца bw, мм" | 30 | 25
    "Коэффициент смещения x" | 0 | 0
    "Межосевое расстояние aw, мм" | 100 | 100
end table
# Тихоходный вал редуктора
b_w1 := 21
b_w2 := 30
τ := 13
T := T_2
d_ср := nthroot(T*1000/(0.2*τ), 3) = 55.4612
d_ср := 56
F_a = 0
α_w := 20°
F_t := 2*T_2/d_1*1000 = 18675.7  # окружная сила
F_r := F_t*tan(α_w)/cos(β) = 6797.42  # радиальная сила
F_a := F_t*tan(β) = 0
# Изгибающий момент
M_a := F_a*d_2/2 = 0
# Сила от муфты
K_М := 125
F_M := K_М*sqrt(T) = 2632.58
d_ш := 40  # диаметр в месте посадки зубчатой шестерни
d_к := 60  # диаметр в месте посадки зубчатого колеса
d_б := 65  # диаметр буртика
d_п := 45  # диаметр в месте посадки подшипника  # подшипник - 36311
# B - 29
d_пр1 := 43
# диаметр промежуточного участка 1
b_п := 16  # ширина подшипника
d_пр2 := 55  # диаметр промежуточного участка 2
l_доп := 10
d_пр3 := 55  # диаметр промежуточного участка 3
l_к := 60  # Колесу требуется ступица
l_б := l_доп
l_ш := b_w2 + l_доп = 40
B := b_п
d := d_п
α := 12°  # параметры подшипника
l_пр := 20
b_шк := 18
h_шк := 11
Шпонки
T_2 = 443.549
колеса
# На d_k - bxh = 18х11
l_шк := 4*T_2*10^3/(h_шк*180*d_к) = 14.9343
Расчет?
b_шш := 12
h_шш := 12
шестерни
# На d_ш - bxh = 12х8
l_шш := 4*T_2*10^3/(h_шш*180*d_ш) = 20.5347
l_шк := 25
# длины шпонок
l_шш := 21
a := (B + (d + B)/2*tan(α))/2 = 11.2415  # точка приложения реакции подшипника
a_1 := l_ш/2 + l_пр + b_n/2 = 50.5
a_2 := b_п/2 + l_пр + l_б + l_к/2 = 68  # расстояния между точками действия сил
a_3 := l_к/2 + l_пр + b_п/2 = 58
R_Bг := (F_t*a_1 - F_M*(a_1 + a_2 + a_3))/(a_1 + a_2) = 4037.77
R_Aг := (F_t*a_2 + F_M*a_3)/(a_1 + a_2) = 12005.4  # горизонтальная поверхность
R_Aг + R_Bг - F_t + F_M = -9.09495e-13
R_Bв := (F_r*a_1 - M_a)/(a_1 + a_2) = 2896.79
R_Aв := (F_r*a_2 + M_a)/(a_1 + a_2) = 3900.63  # вертикальная поверхность
R_Bв + R_Aв - F_r = 0
R_A := sqrt(R_Aг^2 + R_Aв^2) = 12623.2
# Модули суммарных радиальных реакций
R_B := sqrt(R_Bг^2 + R_Bв^2) = 4969.4
M_Cг := R_Aг*a_1*10^-3 = 606.273
# моменты сил
M_Bг := F_M*a_3*10^-3 = 152.689
M_Aг := 0
M_Bв := 0
M_Cв' := R_Aв*a_1*10^-3 = 196.982
M_Dв := 0
M_Aв := 0
M_Dг := 0
M_Bв'' := R_Bв*a_2*10^-3 = 196.982
M_Cв := M_Cв' = 196.982
M_A := sqrt(M_Aг^2 + M_Aв^2) = 0
M_C := sqrt(M_Cг^2 + M_Cв^2) = 637.47
M_B := sqrt(M_Bг^2 + M_Bв^2) = 152.689
M_D := sqrt(M_Dг^2 + M_Dв^2) = 0
M_u := M_C = 637.47  # опасное сечение
d := d_п = 45
σ_u := M_u*1000/(0.1*d^3) = 69.9556
T = 443.549
τ := T*1000/(0.2*d^3) = 24.3374
σ_B := 750
σ_11 := 0.4*σ_B = 300
# Пределы выносливости по напряжениям изгиба, кручения
# Предел прочности по напряжениям кручения
τ_11 := 0.2*σ_B = 150
τ_B := 0.6*σ_B = 450
σ_m := 0
σ_a := σ_u = 69.9556
τ_m := 0.5*τ = 12.1687  # амплитудные и средние составляющие действующих напряжений
τ_a := τ_m
# Коэффициент (показатель степени) в формуле для расчета масштабного
# фактора при изгибе
v_1 := 0.19 - 1.25*10^-4*σ_B = 0.09625
# При кручении
v_2 := 1.5*v_1 = 0.144375
# Масштабный фактор при изгибе
K_dσ := 0.5*(1 + (d/7.5)^(-2*v_1)) = 0.854141
# Масштабный фактор при кручении
K_dτ := 0.5*(1 + (d/7.5)^(-2*v_2)) = 0.798043
R_z1 := 3.2  # Шероховатость вала
R_z2 := 1.6  # Шероховатость колеса, подшипника и полумуфты
# Коэффициент,
# учитывающий качество (шероховатость) поверхности по изгибу
K_Fσ := 1 - 0.22*(log(σ_B/20) - 1)*log(R_z2) = 0.974222
# Коэффициент, учитывающий качество (шероховатость) поверхности
# по кручению
K_Fτ := 0.575*K_Fσ + 0.425 = 0.985178
σ_B = 750
# Случай 1. Если исследуется сечение вала, где с натягом установлена ка
# кая-нибудь деталь (зубчатое колесо, шкив, полумуфта и др.), то определяется
# отношение
# Эффективные коэффициенты концентрации напряжений
K_1 := 0.38 + 1.48*log(d) = 2.82675
p := 20.5
K_2 := 0.305 + 0.0014*σ_B = 1.355
K_3 := 0.65 + 0.014*p = 0.937
K_σσ := K_1*K_2*K_3 = 3.58895  # отношение концентрации напряжении по изгибу
K_ττ := K_σσ*0.6 = 2.15337  # отношение концентрации напряжений по кручению
K_σ := 2
K_τ := 1.7
K_V := 1
# коэффициенты концентрации напряжений в опасном сечении
# при изгибе и кручении
K_σD := (K_σσ + 1/K_Fσ - 1)/K_V = 3.61541
K_τD := (K_ττ + 1/K_Fτ - 1)/K_V = 2.16841
# Коэффициенты, корректирующие влияние постоянной составляющей цик
# ла напряжений на сопротивление усталости по изгибу и кручению
Ψ_σ := 0.02 + 2*10^-4*σ_B = 0.17
Ψ_τ := 0.5*Ψ_σ = 0.085
# запасы сопротивления усталости.
# Запас сопротивления усталости при изгибе
s_σ := σ_11/(K_σD*σ_a + Ψ_σ*σ_m) = 1.18616
# Запас сопротивления усталости при кручении
s_τ := τ_11/(K_τD*τ_a + Ψ_τ*τ_m) = 5.47024
# Общий запас сопротивления усталости
s := s_σ*s_τ/sqrt(s_σ^2 + s_τ^2) = 1.15922
# Расчет вала на статическую прочность и жесткость
σ_u := σ_u*2 = 139.911
τ := τ*2 = 48.6748
# Допускаемые значения напряжений
σ_T := 450
σ_доп := 0.8*σ_T = 360
σ_э := sqrt(σ_u^2 + 3*τ^2) = 163.349
# Момент инерции
J := π*d_п^4/64 = 201289
# Прогиб в горизонтальной плоскости от силы Ft
E := 2.1*10^5
y_Г := F_t*a_1^2*a_2^2/(3*E*J*(a_1 + a_2)) = 0.0146555
a_2 = 68
a_1 = 50.5
a_3 = 58
# Прогиб в вертикальной плоскости от силы Fr
y_В := F_r*a_1^2*a_2^2/(3*E*J*(a_1 + a_2)) = 0.00533415
# Прогиб в вертикальной плоскости от силы Fr
y_М := F_M*a_3*a_1*((a_1 + a_2)^2 - a_1^2)/(6*E*J*(a_1 + a_2)) = 0.0029484
# Суммарный максимально возможный прогиб
y := sqrt(y_Г^2 + y_В^2) + y_М = 0.0185444
0.01*m_n = 0.01
# Расчёт подшипника на прочность | гост 36309
d_n := 45  # Внутренний диаметр подшипника
D_n := 100  # Наружный диаметр
b_n := 25  # Ширина
n := n_2 = 58.3333
C := 32300  # Динамическая грузоподъемность
F_t = 18675.7
F_r = 6797.42
C_0 := 25600  # Статическая грузоподъемность
F_a = 0
F_a/C_0 = 0
e := 0.34 - (0.34 - 0.30)*(F_a/C_0 - 0.014)/(0.029 - 0.014) = 0.377333  # не нужна
# Осевые составляющие реакций от радиальных нагрузок
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S_A := e*R_A = 4763.14
S_B := e*R_B = 1875.12
X_A := F_a + S_B = 1875.12  # Режим нагрузки I
X_A := S_A = 4763.14
X_B := X_A - F_a = 4763.14
K_E := 0.8
# Определяем средние величины реакций опор:
X_Am := K_E*X_A = 3810.52
R_Am := K_E*R_A = 10098.5
X_Bm := K_E*X_B = 3810.52
R_Bm := K_E*R_B = 3975.52
X_Am/C_0 = 0.148848
e := 0.41
V := 1
X_Am/(V*R_Am) = 0.377333
X := 1
Y := 0
К_Б := 1
К_Т := 1
# Определяем эквивалентную динамическую нагрузку, действующую на ле
# вый, более нагруженный подшипник:
P_r := (X*V*R_Am + Y*X_Am)*К_Б*К_Т = 10098.5
P(t) := 0.9  # коэф надежности
a_1 := 1  # коэф долговечности
a_23 := 0.75
L := 60*n*t_Σ/10^6 = 57.12  # ресурс подшипника в млн
p := 3
C = 32300
T_1 = 141.807
C_p := P_r*nthroot(L/(a_1*a_23), p) = 42805.6
n_2 = 58.3333
T_2 = 443.549
X_0 := 0.5
Y_0 := 0.47
P_0 := X_0*R_A + Y_0*X_A = 8550.27
R_A = 12623.2
P_0 := R_A = 12623.2
P_0П := 3*P_0 = 37869.5
C_0 = 25600
# Статическая грузоподъемность подшипника обеспечена.
# для быстроходного вала
