# вариант: 2-16
F := 3500  # кН  # тяговая сила ленты
V := 0.65  # м/c  # скорость грузовой цепи
p := 100  # мм  # шаг грузовой цепи
z := 8  # число зубьев звездочки
L := 4  # лет  # срок службы привода
K_s := 1  # сменность работы
t_c := 10  # ч  # продолжительность смены
# Легкий | режим работы
# Расчет параметров двигателя
# Мощность на приводном валу
N_р.м. := F*V = 2275  # расчет мощности потребляемой механизмом
# КПД привода
η_о.п. := (0.92 + 0.94)/2  # кпд открытой передачи
η_з.п. := (0.93 + 0.95)/2  # кпд закрытой передачи
η_м. := 0.98  # кпд муфты
η_п.к. := (0.99 + 0.995)/2  # кпд пары подшипников качения
η := η_п.к.^3*η_м.*η_о.п.*η_з.п. = 0.837584  # КПД системы в целом
N_р.д. := N_р.м./η = 2716.15  # Расчетная мощность двигателя [кВт]
# Выбран двигатель АИР112МА6
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n_р.о. := 60*1000*V/(z*p) = 48.75  # Частота вращения приводного вала
n_двиг := 950  # Частота вращения вала [об/мин]
P_двиг := 3  # Мощность двигателя [кВт]
# Определение передаточного отношения привода
u := n_двиг/n_р.о. = 19.4872  # Общее передаточное число обоих редукторов
u_о.п. := 5  # Передаточное открытой передачи
u_з.п. := u/u_о.п. = 3.89744  # Передаточное закрытой передачи
# кинематический расчет привода
# Определение силовых и кинематических параметров привода:
# (Б) - быстроходный вал двигателя
# (Т) - тихоходный вал двигателя
# (PO) - вал рабочего органа
# Мощность N, кВт
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# Двигателя
N_д := P_двиг = 3
Б
N_1 := N_д*η_м.*η_п.к. = 2.91795
Т
N_2 := N_1*η_з.п.*η_п.к. = 2.7223
РО
N_РО := N_2*η_о.п.*η_п.к. = 2.51275
# Частота вращения n, мин^-1
# Двигателя
n_ном := n_двиг
Б
n_1 := n_ном = 950
Т
n_2 := n_1/u_з.п. = 243.75
РО
n_РО := n_2/u_о.п. = 48.75
# Угловая скорость ω, c^-^1
# Двигателя
ω_ном := π*n_ном/30 = 99.4838
Б
ω_1 := ω_ном = 99.4838
Т
ω_2 := ω_1/u_з.п. = 25.5254
РО
ω_РО := ω_2/u_о.п. = 5.10509
# Вращающий момент T, Н*м
# Двигателя
T_д := N_д*10^3/ω_ном = 30.1557
Б
T_1 := T_д*η_м.*η_п.к. = 29.3309
Т
T_2 := T_1*u_з.п.*η_з.п.*η_п.к. = 106.651
РО
T_РО := T_2*u_о.п.*η_о.п.*η_п.к. = 492.205
# 1 - передача: цилиндрическая косозубая передача (закрытая)
# 2 - передача: цилиндрическая прямозубая передача (открытая)
# 1 передача:
u_з.п. = 3.89744
# Входные параметры->
n_1 = 950
T_1 = 29.3309
# Выходные параметры->
n_2 = 243.75
T_2 = 106.651
# 2 передача:
u_о.п. = 5
# Входные параметры->
n_2 = 243.75
T_2 = 106.651
# Выходные параметры->
n_РО = 48.75
T_РО = 492.205
# выбор материалов, термообработки, допускаемых напряжений
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# Материал: | Сталь 20X
# Термообработка: | Цементация
# Твердость поверхности:
HRC_min := 56
HRC_max := 63
HRC_avr := (HRC_min + HRC_max)/2 = 59.5
# Предел прочности [МПа]:
σ_В := 650
# Предел текучести [МПа]:
σ_Т := 400
# Расчет напряжений
# Твердость колеса должна быть меньше чем твердость шестерни
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# Для шестерни | Для колеса
HRC_n1 := 60
HRC_n2 := 58
HB_n1 := 650
HB_n2 := 620
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σ_Hlim1 := 23*HRC_n1 = 1380  # Предел контактной выносливости для шестерни [МПа]
σ_Hlim2 := 23*HRC_n2 = 1334  # Предел контактной выносливости для колеса [МПа]
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# Расчет базового числа циклов
N_HG1 := 30*HB_n1^2.4 = 169088204  # Шестерни
N_HG2 := 30*HB_n2^2.4 = 150959799  # Колеса
# ресурс работы передачи в часах
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K_D := 255  # Количество рабочих дней в году
L = 4  # Срок службы в годах
K_s = 1  # Количество смен в сутки
t_c = 10  # Продолжительность смены
t_р.п := L*K_D*K_s*t_c = 10200  # Ресурс работы передачи в часах
# Проектирование цилиндрической косозубой передачи
# Входные параметры->
n_1 = 950
T_1 = 29.3309
# Выходные параметры->
n_2 = 243.75
T_2 = 106.651
# расчет контактных напряжений
S_H := 1.2  # Коэффициент безопасности при цементации
N_HG1 = 169088204
# Базовое число циклов шестерни
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N_HG2 = 150959799  # Базовое число циклов колеса
μ_H := 0.125  # Коэффициент режима работы
c := 1  # Кол. колес находящихся в зацеплении с данным
N_НЕ1 := μ_H*60*c*n_1*t_р.п = 72675000  # Эквивалентное число циклов шестерни
N_НЕ2 := μ_H*60*c*n_2*t_р.п = 18646875  # Эквивалентное число циклов колеса
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Z_N1 := nthroot(N_HG1/N_НЕ1, 6) = 1.15112  # Коэффициент долговечности шестерни
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Z_N2 := nthroot(N_HG2/N_НЕ2, 6) = 1.41702  # Коэффициент долговечности колеса
σ_H1 := σ_Hlim1/S_H*Z_N1 = 1323.79  # Допускаемое контактное напряжение шестерни
σ_H2 := σ_Hlim2/S_H*Z_N2 = 1575.25  # Допускаемое контактное напряжение колеса
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σ_Hm := (σ_H1 + σ_H2)/2 = 1449.52  # Среднее допускаемое напряжение
σ_Hmin := σ_H1 = 1323.79  # Меньшее из σ_H1 и σ_H2
σ_Hп := 1.25*σ_Hmin = 1654.74  # Предельные контактные напряжения
σ_H := σ_Hm = 1449.52  # Окончательное (меньшее из σ_Hm и σ_Hп)
# расчет напряжений изгиба
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σ_Flim1 := 800  # Предел выносливости по напряжению изгиба шестерни
σ_Flim2 := 800  # колеса
m_F := 9
N_FG := 4*10^6  # базовое число циклов для всех сталей
μ_F1 := 0.016  # коэффициент режима работы (напряжение изгиба)
N_FE1 := μ_F1*60*c*n_1*t_р.п = 9302400  # Эквивалентное число циклов шестерни
N_FE2 := μ_F1*60*c*n_2*t_р.п = 2386800  # Эквивалентное число циклов колеса
Y_N1 := nthroot(N_FG/N_FE1, m_F) = 0.910487
Y_N1 := 1  # Коэффициент долговечности шестерни
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Y_N2 := nthroot(N_FG/N_FE2, m_F) = 1.05905  # Коэффициент долговечности колеса
S_F := 1.55
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# Коэффициент безопасности
Y_A := 1  # Коэффициент влияния 2-сторонней нагрузки
σ_F1 := σ_Flim1/S_F*Y_A*Y_N1 = 516.129  # Допускаемое напряжение изгиба шестерни [МПа]
σ_F2 := σ_Flim2/S_F*Y_A*Y_N2 = 546.606  # Допускаемое напряжение изгиба колеса
# Максимальные допускаемые контактные напряжения [МПа]
σ_Hmax1 := 44*HRC_n1 = 2640
# шестерни
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σ_Hmax2 := 44*HRC_n2 = 2552  # колеса
# Максимальные допускаемые напряжения изгиба
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Y_Nmax := 2.5  # коэффициент долговечности
K_st := 1.2  # коэффициент учета частоты приложения пиковой нагрузки
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σ_Fmax1 := 0.5*σ_Flim1*Y_Nmax*K_st = 1200  # шестерни
σ_Fmax2 := 0.5*σ_Flim2*Y_Nmax*K_st = 1200  # колеса
# Проектный расчет цилиндрической косозубой передачи
K_d := 680  # Вспомогательный коэффициент
Ψ_ba := 0.25  # Коэффициент ширины колеса относительно межосевого расстояния
Ψ_bd := 0.5*Ψ_ba*(u_з.п. + 1) = 0.612179
# Коэффициент ширины колеса относительно делительного расстояния
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K_Hβ := 1.06  # Коэффициент концентрации нагрузки
d_1 := K_d*nthroot(T_1*K_Hβ/(σ_H^2*Ψ_bd)*((u_з.п. + 1)/u_з.п.), 3) = 21.2165  # Делительный диаметр [мм]
b_w := d_1*Ψ_bd = 12.9883  # Расчетная ширина зубчатых колес [мм]
b_w := 34  # мм  # Подобранная ширина зубчатых колес [мм]
b_w1 := b_w + 8 = 42  # Ширина шестерни [мм]
b_w2 := b_w = 34  # Ширина колеса [мм]
Ψ_m := 20  # Коэффициент модуля
m_n := b_w/Ψ_m = 1.7
m_n := 3  # Принимаем стандартный модуль передачи [мм]
ε_β := 1.1  # Коэффициент осевого перекрытия
β' := asin(ε_β*π*m_n/b_w) = 0.309854  # Предварительный угол наклона зубьев [рад]
β'° := β'*180/π = 17.7533  # Предварительный угол наклона зубьев [градусов]
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z'_1 := d_1*cos(β')/m_n = 6.73537  # Расчетное число зубьев шестерни
z_1 := 16  # Принимаем стандартное число зубьев
z_2 := z_1*u_з.п. = 62.359  # Расчетное число зубьев колеса
z_2 := 63  # Число зубьев шестерни
u_з.п. = 3.89744
z_2/z_1 = 3.9375  # Расчетное и фактическое передаточное число передачи
x_1 := 0  # Коэффициент смещения шестерни
x_2 := x_1 = 0  # Коэффициент смещения колеса
a'_w := m_n*(z_2 + z_1)/(2*cos(β')) = 124.425  # Предварительное межосевое расстояние  [мм]
a_w := 125  # Принимаем стандартное межосевое расстояние [мм]
β := acos(m_n*(z_2 + z_1)/(2*a_w)) = 0.323904  # Уточняем угол наклона зубьев [рад]
β° := β*180/π = 18.5584  # [градусов]
d_1 := m_n*z_1/cos(β) = 50.6329  # Делительный диаметр шестерни [мм]
d_2 := m_n*z_2/cos(β) = 199.367  # Делительный диаметр колеса [мм]
# Проверочные расчеты цилиндрической косозубой передачи
E_np := 2.1*10^5  # Модуль упругости [МПа]
ε_a := (0.95 - 1.6*(1/z_1 + 1/z_2))*(1 + cos(β))*cos(β) = 1.5228  # Коэффициент торцевого перекрытия
ε_βп := b_w*sin(β)/(π*m_n) = 1.14816
ε_β = 1.1  # Коэффициент осевого перекрытия (больше предыдущего так что все хорошо)
Z_Hβ := sqrt(cos(β)^2/ε_a) = 0.768223  # Коэффициент
C := 0.15  # Коэффициент твердости и типа зубьев
n_ст := 9  # Степень точности изготовления колес
K_Ha := 1 + C*(n_ст - 5) = 1.6  # Коэффициент распределения нагрузки
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v := π*d_1*n_1/(60*1000) = 2.51858  # Окружная скорость [м/с]
K_Hv := 1.3  # Коэффициент
K_Fv := K_Hv = 1.3  # Коэффициент
K_H := K_Ha*K_Hβ*K_Hv = 2.2048  # Коэффициент расчетной нагрузки
σ_Hnew := 1.18*Z_Hβ*sqrt(E_np*T_1*10^3*K_H/(d_1^2*b_w*sin(2*20°))*((u_з.п. + 1)/u_з.п.)) = 500.282
σ_H = 1449.52
# Условие прочности выполняется перегрузка в минусе
Δ_σH := (σ_Hnew - σ_H)/σ_H*100 = -65.4864
# Определение сил в зацеплении
F_t := 2*T_1/(d_1*10^-3) = 1158.57  # Окружная сила [Н]
F_r := F_t*tan(20°)/cos(β) = 444.816  # Другие составляющие силы [Н]
F_a := F_t*tan(β) = 388.965
z_v1 := z_1/cos(β)^3 = 18.78  # Эквивалентное число зубьев шестерни
z_v2 := z_2/cos(β)^3 = 73.9461
# Эквивалентное число зубьев колеса
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Y_FS1 := 4.2  # Коэффициент формы зуба шестерни
Y_FS2 := 3.72  # Коэффициент формы зуба колеса
# Для шестерни и для колеса находим отношение Y_FS/[σ_F]
σ_F1/Y_FS1 = 122.888
σ_F2/Y_FS2 = 146.937
# Дальнейший расчет ведем по шестерни, т. к. данное соотношение меньше. То есть принимаем
Y_FS := Y_FS1 = 4.2
σ_F := σ_F1 = 516.129
Y_β := 1 - β°/100 = 0.814416
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Y_Fβ := Y_β/ε_a = 0.534816
Y_Fβ := 0.7
K_Fa := K_Ha = 1.6  # Коэффициент распределения нагрузки между зубьями
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K_Fβ := 1.05
Ψ_bd = 0.612179  # Коэффициент концентрации нагрузки
K_Kv := 1  # Коэффициент динамической нагрузки
K_F := K_Fa*K_Fβ*K_Kv = 1.68  # Коэффициент расчетной нагрузки
σ_Fnew := F_t*K_F*Y_FS*Y_Fβ/(b_w*m_n) = 56.1021
Δ_σF := (σ_Fnew - σ_F)/σ_F*100 = -89.1302  # Перегрузка в минусе так что все хорошо
K_П := 2
σ_Hmax := σ_Hnew*sqrt(K_П) = 707.506
σ_Hmax1 = 2640  # Напряжения по напряжениям с перегрузками меньше допустимых так что все хорошо
σ_Fmax := σ_F*K_П = 1032.26
σ_Fmax1 = 1200
# Расчет геометрии передачи и оформление результатов расчета
h'_a := 1  # Коэффициент высоты головки зуба
с := 0.25  # Коэффициент радиального зазора
Δy := 0  # Коэффициент уравнительного смещения
d_a1 := d_1 + 2*m_n*(h'_a + x_1 - Δy) = 56.6329  # Диаметр вершин зубьев шестерни
d_a2 := d_2 + 2*m_n*(h'_a + x_2 - Δy) = 205.367  # Диаметр вершин зубьев колеса
d_f1 := d_1 - 2*m_n*(h'_a + с - x_1) = 43.1329  # Диаметр впадин зубьев шестерни
d_f2 := d_2 - 2*m_n*(h'_a + с - x_2) = 191.867  # Диаметр впадин зубьев колеса
# Параметр | Шестерня | Колесо
# Число зубьев z:
z_1 = 16
z_2 = 63
# Модуль m:
m_n = 3
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# Фактическое передаточное u:
z_2/z_1 = 3.9375
# Угол наклона зубьев β:
β° = 18.5584
# Делительный диаметр d:
d_1 = 50.6329
d_2 = 199.367
# Диаметр вершин d_a:
d_a1 = 56.6329
d_a2 = 205.367
# Диаметр впадин d_f:
d_f1 = 43.1329
d_f1 = 43.1329
# Ширине зубчатого венца b_w:
b_w1 = 42
b_w2 = 34
# Коэффициент смещения x:
x_1 = 0
x_2 = 0
# Межосевое расстояние a_w:
a_w = 125
# Проектирование цилиндрической прямозубой передачи
# Входные параметры->
n_2 = 243.75
T_2 = 106.651
# Выходные параметры->
n_РО = 48.75
T_РО = 492.205
# Расчет коэффициента долговечности
S_H := 1.2  # Коэффициент безопасности
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N_HG1 := 30*HB_n1^2.4 = 169088204  # Базовое число циклов шестерни
N_HG2 := 30*HB_n2^2.4 = 150959799  # Колеса
t_р.п = 10200  # Ресурс работы передачи в часах
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μ_H = 0.125  # Коэффициент режима работы
c := 1  # Кол. колес находящихся в зацеплении с данным
N_НЕ1 := μ_H*60*c*n_2*t_р.п = 18646875  # Эквивалентное число циклов шестерни
N_НЕ2 := μ_H*60*c*n_РО*t_р.п = 3729375  # Колеса
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Z_N1 := nthroot(N_HG1/N_НЕ1, 6) = 1.44406  # Коэффициент долговечности шестерни
Z_N2 := nthroot(N_HG2/N_НЕ2, 6) = 1.85298  # Колеса
σ_H1 := σ_Hlim1/S_H*Z_N1 = 1660.67  # Допускаемое контактное напряжение шестерни
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σ_H2 := σ_Hlim2/S_H*Z_N2 = 2059.9  # Колеса
σ_Hm := (σ_H1 + σ_H2)/2 = 1860.28  # Среднее допускаемое напряжение
σ_Hmin := σ_H1 = 1660.67  # Меньшее из σ_H1 и σ_H2
σ_Hп := 1.25*σ_Hmin = 2075.83  # Предельные контактные напряжения
σ_H := σ_Hm = 1860.28  # Окончательное (меньшее из σ_Hm и σ_Hп)
# Расчет допускаемого напряжения изгиба
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σ_Flim1 := 800  # Предел выносливости по напряжению изгиба шестерни
σ_Flim2 := 800  # колеса
m_F := 9
N_FG := 4*10^6  # базовое число циклов для всех сталей
μ_F1 := 0.036  # коэффициент режима работы (напряжение изгиба)
# Эквивалентное число циклов
# шестерни | колеса
N_FE1 := μ_F1*60*c*n_2*t_р.п = 5370300
N_FE2 := μ_F1*60*c*n_РО*t_р.п = 1074060
# Коэффициент долговечности
# шестерни
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# колеса
Y_N1 := nthroot(N_FG/N_FE1, m_F) = 0.967798
Y_N1 := 1
Y_N2 := nthroot(N_FG/N_FE2, m_F) = 1.15731
S_F = 1.55  # Коэффициент безопасности
Y_A = 1  # Коэффициент влияния 2-сторонней нагрузки
# Допускаемое напряжение изгиба [МПа]
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# шестерни | колеса
σ_F1 := σ_Flim1/S_F*Y_A*Y_N1 = 516.129
σ_F2 := σ_Flim2/S_F*Y_A*Y_N2 = 597.319
# Проектный расчет цилиндрической прямозубой передачи
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# Формула(2.48)
u_о.п. = 5  # Передаточное число требуемое от передачи
T_РО = 492.205  # Момент требуемый на колесе[Н*м]
E_np = 210000  # Приведенный модуль упругости [МПа]
σ_H = 1860.28  # Контактное напряжение
Ψ_ba = 0.25  # Коэффициент ширины колеса относительно межосевого расстояния
Ψ_bdmax := (0.45 + 0.55)/2 = 0.5  # Табл(2.7)
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# Формула(2.17)
Ψ_bd := 0.5*Ψ_ba*(u_о.п. + 1) = 0.75  # Коэффициент ширины колеса относительно делительного диаметра
# Рис(2.4)
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K_Hβ := 1.06
C = 0.15  # Коэффициент твердости и типа зубьев
n_ст := 9  # Степень точности изготовления колес (5-9)
# Формула(2.32)
K_Hα := 1 + C*(n_ст - 5) = 1.6
a_w := 0.85*(u_о.п. + 1)*nthroot(E_np*T_РО*10^3*K_Hα*K_Hβ/(σ_H^2*u_о.п.*Ψ_ba), 3) = 175.177  # Межосевое расстояние[мм]
a_w := 180  # Округляем межосевое расстояние до ближайшего стандартного Табл(2.2)
b_w := a_w*Ψ_ba = 45  # Ширена зубчатых колес по формуле(2.49)
b_w1 := b_w + 7 = 52  # Ширена Шестерни (добавляется 5-10 мм)
b_w2 := b_w = 45  # Ширена Колеса
Ψ_m := (20 + 15)/2 = 17.5  # Табл(2.8)
m := b_w/Ψ_m = 2.57143  # Модуль передачи по формуле(2.19)(принимаем стандартный модуль 2)
m := 3
z_Δ := 2*a_w/m = 120  # Суммарное количество зубьев по формуле(2.50)
z_1 := z_Δ/(u_о.п. + 1) = 20  # Количество зубьев Шестерни
z_2 := z_Δ - z_1 = 100  # Количество зубьев Колеса
# Нахождение погрешности
u_о.п. = 5
z_2/z_1 = 5
z_2/z_1*(u_о.п./100)^-1 = 100  # Погрешность <5% так что все хорошо
d_1 := m*z_1 = 60  # Делительный диаметр шестерни
d_2 := m*z_2 = 300  # Делительный диаметр колеса
# Проверочные расчеты цилиндрической прямозубой передачи
β := 0  # Угол наклона зубьев =0 т.к. передача прямозубая
ε_a := (0.95 - 1.6*(1/z_1 + 1/z_2))*(1 + cos(β))*cos(β) = 1.708  # Коэффициент перекрытия по формуле(2.28)
ε_β := b_w*sin(β)/(π*m) = 0  # Коэффициент осевого перекрытия по формуле(2.29)
Z_Hβ := sqrt(cos(β)^2/ε_a) = 0.765167  # По формуле(2.30)
n_ст = 9  # Степень точности изготовления колес (5-9)
C = 0.15  # Коэффициент твердости и типа зубьев
K_Ha := 1 + C*(n_ст - 5) = 1.6  # Коэффициент распределения нагрузки между зубьями по формуле(2.32)
v := π*d_1*10^-3*n_1/60 = 2.98451  # Окружная скорость[м/с] по формуле(2.33)
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K_Hv := 1.5  # По табл(В.1)
K_H := K_Ha*K_Hβ*K_Hv = 2.544  # Коэффициент расчетной нагрузки по формуле(2.31)
# Шестерни | Колеса
b_w := 20
b_w1 = 52
b_w2 = 45
b_w1 := b_w + 8 = 28
b_w2 := b_w = 20
σ_H = 1860.28  # Контактное напряжение рассчитанное до
a' := 20
σ_H.пр := 1.18*Z_Hβ + sqrt(E_np*T_2*10^3*K_H/(d_1^2*b_w*sin(2*a'°))*((u_о.п. + 1)/u_о.п.)) = 1216.36  # по формуле(2.27)
Δ_σH := (σ_H.пр - σ_H)/σ_H*100 = -34.6141  # Перегрузка в минусе так что все хорошо
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# по формуле(2.1)стр 33
F_t := 2*T_2/(d_1*10^-3) = 3555.02
x_1 := 0
x_2 := 0
F_r := F_t*tan(a_w°)/cos(β) = -4.3535e-13
F_a := F_t*tan(β) = 0
z_v1 := z_1/cos(β)^3 = 20
z_v2 := z_2/cos(β)^3 = 100
# По рис(2.6)
# шестерня | колесо
Y_FS1 := 4.15
Y_FS2 := 3.75
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σ_F1/Y_FS1 = 124.368
σ_F2/Y_FS2 = 159.285
# Дальнейший расчет ведем по шестерне тк это соотношение меньше
σ_F := σ_F1 = 516.129
Y_FS := Y_FS1 = 4.15
Y_β := 1 - β°/100 = 1
# По рис(2.7)
Y_Fβ := Y_β/ε_a = 0.58548
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K_Fa := K_Ha = 1.6
K_Fβ := 1.04
Ψ_bd = 0.75
K_Fv := K_Hv = 1.5
K_F := K_Fa*K_Fβ*K_Fv = 2.496
σ_F = 516.129  # Рассчитанное до напряжение изгиба
σ_F.пр := F_t*K_F*Y_FS*Y_Fβ/(b_w*m) = 359.331  # Напряжение изгиба
Δ_σF := (σ_F.пр - σ_F)/σ_F*100 = -30.3795  # Небольшая недогрузка так что все хорошо
K_П := 2  # Допускаемая перегрузка передачи
σ_Hmax1 = 2640
σ_Hmax2 = 2552
σ_Hmax := σ_H.пр*sqrt(K_П) = 1720.2  # Т.к. меньше 2 верхних все рассчитано верно
σ_Fmax1 = 1200
σ_Fmax2 = 1200
σ_Fmax := σ_F.пр*K_П = 718.663  # Т.к. меньше 2 верхних все рассчитано верно
# Расчет геометрии передачи и оформление результатов расчета
h_a := 1  # Коэффициент высоты головки зуба
Δy := 0  # Коэффициент уравнительного смещения
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x_1 = 0
x_2 = 0
c_z := 0.25  # Коэффициент радиального зазора
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# Диаметры вершин зубьев [мм]
# шестерни | колеса
d_a1 := d_1 + 2*m*(h_a + x_1 - Δy) = 66
d_a2 := d_2 + 2*m*(h_a + x_2 - Δy) = 306
# Диаметры впадин зубьев [мм]
# шестерни | колеса
d_f1 := d_1 - 2*m*(h_a + c_z - x_1) = 52.5
d_f2 := d_2 - 2*m*(h_a + c_z - x_2) = 292.5
# Шестерня | Колесо
# Число зубьев z:
z_1 = 20
z_2 = 100
# Модуль m:
m = 3
# Фактическое передаточное число u=z_2/z_1:
z_2/z_1 = 5
# Делительный диаметр d:
d_1 = 60
d_2 = 300
# Диаметр вершин d_a:
d_a1 = 66
d_a2 = 306
# Диаметр впадин d_f:
d_f1 = 52.5
d_f2 = 292.5
# Коэффициент смещения:
x_1 = 0
x_2 = 0
# Межосевое расстояние
a_w = 180
# Ширена
b_w1 = 28
b_w2 = 20
# Проектирование валов
# Табл(8.1)
τ := 12.5
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d_2cp := nthroot(T_1*10^3/(0.2*τ), 3) = 22.7228
d_2cp := 23
# Вал (ll) [мм]
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τ := 14.5
d_3cp := nthroot(T_2*10^3/(0.2*τ), 3) = 33.2548
d_3cp := 35  # Вал (lll) [мм]
d_4cp := nthroot(T_РО*10^3/(0.2*τ), 3) = 55.3668
d_4cp := 58  # Вал (lV) [мм]
# Проектирование шпонок
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# Для вала (ll)
# Длина
l_p := 10
# Высота
h := 7
# Ширена
b := 8
# Глубина пазов
# На валу
h_v := 4
# На втулке
h_k := 3.3
# Радиус закругления | от 0.16 до 0.25
σ_cm1 := 4*T_1*10^3/(h*l_p*d_2cp) = 72.8718  # В пределе нормы
# Для вала (lll)
# Длина
l_p := 16
# Высота
h := 8
# Ширена
b := 10
# Глубина пазов
# На валу
h_v := 5
# На втулке
h_k := 3.3
# Радиус закругления | от 0.25 до 0.4
# Если вал 30-38 мм в диаметре
σ_cm1 := 4*T_2*10^3/(h*l_p*d_3cp) = 95.2237  # В пределе нормы
# Длина
l_p := 12
# Высота
h := 8
# Ширена
b := 12
# Глубина пазов
# На валу
h_v := 5
# На втулке
h_k := 3.3
# Радиус закругления | от 0.25 до 0.4
# Если вал 38-44 мм в диаметре
σ_cm1 := 4*T_2*10^3/(h*l_p*d_3cp) = 126.965  # В пределе нормы
# Для вала (lV)
# Длина
l_p := 24
# Высота
h := 11
# Ширена
b := 18
# Глубина пазов
# На валу
h_v := 7
# На втулке
h_k := 4.4
# Радиус закругления | от 0.16 до 0.25
σ_cm1 := 4*T_РО*10^3/(h*l_p*d_4cp) = 128.58  # ВВ пределе нормы
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